// COMSOL Multiphysics 6.0.0.318 model "thin_plate.mph"
// Out-of-Plane Heat Transfer for a Thin Plate
// Modeling heat transfer in a thin rectangular metal plate, this example demonstrates how to use the Out-of-Plane Heat Transfer feature. Heat transfer is simulated using a 2D approximation where the temperature is assumed to be constant along the thickness. A surrounding liquid cools the plate by convection. In addition, the model considers surface-to-ambient radiation. To check the validity of the 2D approximation, the equivalent 3D model is also solved.
// Outline of the model tree
// Components: comp1 "Component 1", comp2 "Component 2"

Parameters
  length = 1[m]  // Square side length
  T_ext = 300[K]  // Ambient temperature
  T_hot = 800[K]  // Hot temperature
  thickness = 10[mm]  // Plate thickness
  h_c = 10[W/(m^2*K)]  // Heat transfer coefficient

Geometry
  geom1 "Geometry 1" [comp1] (2D, length unit m)
    sq1: Square | size = length
    fin: Finalize "Form Union"
  geom2 "Geometry 2" [comp2] (3D, length unit m)
    blk1: Block | size = {length, length, thickness}
    fin: Finalize "Form Union"

Materials
  mat1: Common "Copper" [comp1] on all domains
    def "Basic"
      relpermeability = 1
      electricconductivity = 5.998e7[S/m]
      thermalexpansioncoefficient = 17e-6[1/K]
      heatcapacity = 385[J/(kg*K)]
      relpermittivity = 1
      density = 8960[kg/m^3]
      thermalconductivity = 400[W/(m*K)]
    Enu "Young's modulus and Poisson's ratio"
      E = 110e9[Pa]
      nu = 0.35
    linzRes "Linearized resistivity"
      rho0 = 1.72e-8[ohm*m]
      alpha = 0.0039[1/K]
      Tref = 298[K]
  mat2: Common "Copper" [comp2] on all domains
    // same settings as mat1

Physics
  ht: HeatTransfer "Heat Transfer in Solids" [geom1] on all domains
    dependent variable T
    PhysicalModelProperty.dz = thickness
    solid1: SolidHeatTransferModel "Solid 1" (default)
    init1: init "Initial Values 1" (default)
    ins1: ThermalInsulation (default)
    ophf1: OutOfPlaneHeatFlux on domains 1
      UpsideHeatFluxType = ConvectiveHeatFlux
      DownsideHeatFluxType = ConvectiveHeatFlux
      h_u = h_c
      Text_u = T_ext
      h_d = h_c
      Text_d = T_ext
    oprd1: OutOfPlaneRadiation on domains 1
      epsilond_mat = userdef
      epsilond = 0.5
      epsilonu_mat = userdef
      epsilonu = 0.5
      Tambd = T_ext
      Tambu = T_ext
    temp1: TemperatureBoundary "Temperature 1" on boundaries 1 | T0 = T_hot
  ht2: HeatTransfer "Heat Transfer in Solids 2" [geom2] on all domains
    dependent variable T2
    solid1: SolidHeatTransferModel "Solid 1" (default)
    init1: init "Initial Values 1" (default)
    ins1: ThermalInsulation (default)
    hf1: HeatFluxBoundary "Heat Flux 1" on boundaries 3, 4 | HeatFluxType = ConvectiveHeatFlux; h = h_c; Text = T_ext
    sar1: SurfaceToAmbientRadiation on boundaries 3, 4 | epsilon_rad_mat = userdef; epsilon_rad = 0.5; Tamb = T_ext
    temp1: TemperatureBoundary "Temperature 1" on boundaries 1 | T0 = T_hot

Mesh
  mesh1 "Mesh 1" [geom1] (physics-controlled)
  mesh2 "Mesh 2" [geom2] (physics-controlled)

Studies
  std1 "Study 1"
    stat: Stationary | solve for = {ht}
  std2 "Study 2"
    stat: Stationary | solve for = {ht2}

Solver configurations
  sol1 "Solution 1" (study std1)
    v1: Variables "Dependent Variables 1"
    s1: Stationary "Stationary Solver 1"
      fc1: FullyCoupled | linsolver = d1; initstep = 0.01; minstep = 1.0E-6; maxiter = 50
      d1: Direct "Direct, heat transfer variables (ht)" | linsolver = pardiso; pivotperturb = 1.0E-13
  sol2 "Solution 2" (study std2)
    v1: Variables "Dependent Variables 1"
    s1: Stationary "Stationary Solver 1"
      fc1: FullyCoupled | linsolver = d1; initstep = 0.01; minstep = 1.0E-6; maxiter = 50
      d1: Direct "Direct, heat transfer variables (ht2)" | linsolver = pardiso; pivotperturb = 1.0E-13

Datasets
  dset1: Solution | solution = sol1
  dset2: Solution | solution = sol2
  dset3: Solution | solution = sol2

Plots
  pg1: PlotGroup2D "Temperature (ht)" | data = dset1
    surf1: Surface | expr = T
  pg2: PlotGroup2D "Isothermal Contours (ht)" | data = dset1
    con1: Contour | expr = T; levelrounding = off
  pg3: PlotGroup3D "Temperature (ht2)" | data = dset3
    surf1: Surface | expr = T2
  pg4: PlotGroup3D "Isothermal Contours (ht2)" | data = dset3
    iso1: Isosurface | expr = T2; levelrounding = off
  pg5: PlotGroup1D "Models Comparison" | data = dset1
    lngr1: LineGraph on boundaries 2 | expr = T; xdataexpr = x; legends = 2D Model
    lngr2: LineGraph on edges 3 | data = dset3; expr = T2; descr = Temperature; xdataexpr = x; legends = 3D Model