// COMSOL Multiphysics 6.0.0.318 model "open_pipe.mph"
// Open Pipe
// If you plan on setting up a large, complicated acoustics model, it can be useful to break it up in smaller, simpler problems. In this example, a vibrating piston is mounted inside one end of a cylindrical pipe, while the other end is open. The example compares the results from using a specified impedance boundary condition on the pipe outlet to the results using a perfectly matched layer condition for the air outside the piston. This comparison is done for both a pipe mounted in a baffle (flanged pipe), and an unflanged pipe.
// Outline of the model tree
// Components: comp1 "Component 1 - Flanged pipe radiation", comp2 "Component 2 - Unflanged pipe radiation"

Parameters
  a = 0.25[m]  // Pipe radius
  L = 1.5[m]  // Pipe length
  rho_air = 1.25[kg/m^3]  // Air density
  c_air = 343[m/s]  // Speed of sound in air
  a0 = 1[m/s^2]  // Applied piston acceleration
  fmin = 10[Hz]  // Minimum study frequency
  fmax = 1000[Hz]  // Maximum study frequency
  hmax = c_air/fmax/6  // Mesh size to resolve the minimum wavelength
  alpha11 = 3.832  // Zero of the first derivative of the Bessel function
  fcut = (alpha11*c_air/a)/(2*pi)  // Cutoff frequency

Couplings
  intop1: Integration on boundaries 4 | axisym = on
  intop2: Integration on boundaries 4 | axisym = on

Coordinate systems
  pml1: PML "Perfectly Matched Layer 1" [geom1] on domains 3
    stretchingType = rational
    wavelengthSource = acpr2
    PMLfactor = 0.5
    PMLgamma = 5
  pml2: PML "Perfectly Matched Layer 2" [geom2] on domains 3, 4
    stretchingType = rational
    wavelengthSource = acpr4
    PMLfactor = 0.5
    PMLgamma = 5

Geometry
  geom1 "Geometry 1" [comp1] (2D axisymmetric, length unit m)
    r1: Rectangle | pos = {0, -L}; size = {a, L}
    c1: Circle | layername = Layer 1; layer = 2*a; r = 6*a; angle = 90
    fin: Finalize "Form Union"
  geom2 "Geometry 2" [comp2] (2D axisymmetric, length unit m)
    r1: Rectangle | pos = {0, -L}; size = {a, L}
    c1: Circle | rot = -90; layername = Layer 1; layer = 2*a; r = 6*a; angle = 180
    uni1: Union | input = c1, r1
    fin: Finalize "Form Union"
    cmd1: CompositeDomains "Form Composite Domains 1" | input = fin(1) domains 1-3

Materials
  mat1: Common "Material 1" [comp1] on all domains
    def "Basic"
      density = rho_air
      soundspeed = c_air
  mat2: Common "Material 2" [comp2] on all domains
    def "Basic"
      density = rho_air
      soundspeed = c_air

Physics
  acpr: PressureAcoustics "Pressure Acoustics, Frequency Domain - impedance model" [geom1] on domains 1
    dependent variable p
    fpam1: FrequencyPressureAcousticsModel "Pressure Acoustics 1" (default)
    axi1: AxialSymmetry (default)
    shb1: SoundHard "Sound Hard Boundary (Wall) 1" (default)
    init1: init "Initial Values 1" (default)
    nacc1: NormalAcceleration on boundaries 2 | nacc = a0
    imp1: Impedance on boundaries 4 | ImpedanceModel = EndImpedance; innera = a
  acpr2: PressureAcoustics "Pressure Acoustics, Frequency Domain 2 - perfectly matched layers" [geom1] on all domains
    dependent variable p2
    fpam1: FrequencyPressureAcousticsModel "Pressure Acoustics 1" (default)
    axi1: AxialSymmetry (default)
    shb1: SoundHard "Sound Hard Boundary (Wall) 1" (default)
    init1: init "Initial Values 1" (default)
    nacc1: NormalAcceleration on boundaries 2 | nacc = a0
  acpr3: PressureAcoustics "Pressure Acoustics, Frequency Domain 3 - impedance BC" [geom2] on domains 1
    dependent variable p3
    fpam1: FrequencyPressureAcousticsModel "Pressure Acoustics 1" (default)
    axi1: AxialSymmetry (default)
    shb1: SoundHard "Sound Hard Boundary (Wall) 1" (default)
    init1: init "Initial Values 1" (default)
    nacc1: NormalAcceleration on boundaries 2 | nacc = a0
    imp1: Impedance on boundaries 4 | ImpedanceModel = EndImpedance; innera = a; EndImpedanceType = UnflangedPipeCircular
  acpr4: PressureAcoustics "Pressure Acoustics, Frequency Domain 4 - perfectly matched layers" [geom2] on all domains
    dependent variable p4
    fpam1: FrequencyPressureAcousticsModel "Pressure Acoustics 1" (default)
    axi1: AxialSymmetry (default)
    shb1: SoundHard "Sound Hard Boundary (Wall) 1" (default)
    init1: init "Initial Values 1" (default)
    nacc1: NormalAcceleration on boundaries 2 | nacc = a0
    ishb1: InteriorSoundHard "Interior Sound Hard Boundary (Wall) 1" on boundaries 7, 8

Mesh
  mesh1 "Mesh 1" [geom1]
    size: MeshSizeDefault | hmax = hmax; hmin = 6.0E-4; custom = on
    ftri1: FreeTri "Free Triangular 1" on domains 1, 2
      size1: Size on points 6 | hmax = hmax/15; custom = on
    map1: Map "Mapped 1" on remaining entities
      dis1: Distribution on boundaries 8 | numelem = 14
  mesh2 "Mesh 2" [geom2]
    size: MeshSizeDefault | hmax = hmax; hmin = 6.0E-4; custom = on
    ftri1: FreeTri "Free Triangular 1" on domains 1, 2
      size1: Size on points 8 | hmax = hmax/15; custom = on
    map1: Map "Mapped 1" on domains 3, 4

Studies
  std1 "Study 1 - Flanged pipe with impedance BC"
    freq: Frequency "Frequency Domain"
      plist = {10, 10.3, 10.6, 10.9, 11.2, 11.5, 11.8, 12.2, 12.5, 12.8, 13.2, 13.6, 14, 14.5, 15, 15.5, 16, 16.5, 17, 17.5, 18, 18.5, 19, 19.5, 20, 20.6, 21.2, 21.8, 22.4, 23, 23.6, 24.3, 25, 25.8, 26.5, 27.2, 28, 29, 30, 30.7, 31.5, 32.5, 33.5, 34.5, 35.5, 36.5, 37.5, 38.7, 40, 41.2, 42.5, 43.7, 45, 46.2, 47.5, 48.7, 50, 51.5, 53, 54.5, 56, 58, 60, 61.5, 63, 65, 67, 69, 71, 73, 75, 77.5, 80, 82.5, 85, 87.5, 90, 92.5, 95, 97.5, 100, 103, 106, 109, 112, 115, 118, 122, 125, 128, 132, 136, 140, 145, 150, 155, 160, 165, 170, 175, 180, 185, 190, 195, 200, 206, 212, 218, 224, 230, 236, 243, 250, 258, 265, 272, 280, 290, 300, 307, 315, 325, 335, 345, 355, 365, 375, 387, 400, 412, 425, 437, 450, 462, 475, 487, 500, 515, 530, 545, 560, 580, 600, 615, 630, 650, 670, 690, 710, 730, 750, 775, 800, 825, 850, 875, 900, 925, 950, 975, 1e3}
      solve for = {acpr}
  std2 "Study 2 - Flanged pipe with PML"
    freq: Frequency "Frequency Domain"
      plist = {10, 10.3, 10.6, 10.9, 11.2, 11.5, 11.8, 12.2, 12.5, 12.8, 13.2, 13.6, 14, 14.5, 15, 15.5, 16, 16.5, 17, 17.5, 18, 18.5, 19, 19.5, 20, 20.6, 21.2, 21.8, 22.4, 23, 23.6, 24.3, 25, 25.8, 26.5, 27.2, 28, 29, 30, 30.7, 31.5, 32.5, 33.5, 34.5, 35.5, 36.5, 37.5, 38.7, 40, 41.2, 42.5, 43.7, 45, 46.2, 47.5, 48.7, 50, 51.5, 53, 54.5, 56, 58, 60, 61.5, 63, 65, 67, 69, 71, 73, 75, 77.5, 80, 82.5, 85, 87.5, 90, 92.5, 95, 97.5, 100, 103, 106, 109, 112, 115, 118, 122, 125, 128, 132, 136, 140, 145, 150, 155, 160, 165, 170, 175, 180, 185, 190, 195, 200, 206, 212, 218, 224, 230, 236, 243, 250, 258, 265, 272, 280, 290, 300, 307, 315, 325, 335, 345, 355, 365, 375, 387, 400, 412, 425, 437, 450, 462, 475, 487, 500, 515, 530, 545, 560, 580, 600, 615, 630, 650, 670, 690, 710, 730, 750, 775, 800, 825, 850, 875, 900, 925, 950, 975, 1e3}
      solve for = {acpr2}
  std3 "Study 3 - Unflanged pipe with impedance BC"
    freq: Frequency "Frequency Domain"
      plist = {10, 10.3, 10.6, 10.9, 11.2, 11.5, 11.8, 12.2, 12.5, 12.8, 13.2, 13.6, 14, 14.5, 15, 15.5, 16, 16.5, 17, 17.5, 18, 18.5, 19, 19.5, 20, 20.6, 21.2, 21.8, 22.4, 23, 23.6, 24.3, 25, 25.8, 26.5, 27.2, 28, 29, 30, 30.7, 31.5, 32.5, 33.5, 34.5, 35.5, 36.5, 37.5, 38.7, 40, 41.2, 42.5, 43.7, 45, 46.2, 47.5, 48.7, 50, 51.5, 53, 54.5, 56, 58, 60, 61.5, 63, 65, 67, 69, 71, 73, 75, 77.5, 80, 82.5, 85, 87.5, 90, 92.5, 95, 97.5, 100, 103, 106, 109, 112, 115, 118, 122, 125, 128, 132, 136, 140, 145, 150, 155, 160, 165, 170, 175, 180, 185, 190, 195, 200, 206, 212, 218, 224, 230, 236, 243, 250, 258, 265, 272, 280, 290, 300, 307, 315, 325, 335, 345, 355, 365, 375, 387, 400, 412, 425, 437, 450, 462, 475, 487, 500, 515, 530, 545, 560, 580, 600, 615, 630, 650, 670, 690, 710, 730, 750, 775, 800, 825, 850, 875, 900, 925, 950, 975, 1e3}
      solve for = {acpr3}
  std4 "Study 4 - Unflanged pipe with PML"
    freq: Frequency "Frequency Domain"
      plist = {10, 10.3, 10.6, 10.9, 11.2, 11.5, 11.8, 12.2, 12.5, 12.8, 13.2, 13.6, 14, 14.5, 15, 15.5, 16, 16.5, 17, 17.5, 18, 18.5, 19, 19.5, 20, 20.6, 21.2, 21.8, 22.4, 23, 23.6, 24.3, 25, 25.8, 26.5, 27.2, 28, 29, 30, 30.7, 31.5, 32.5, 33.5, 34.5, 35.5, 36.5, 37.5, 38.7, 40, 41.2, 42.5, 43.7, 45, 46.2, 47.5, 48.7, 50, 51.5, 53, 54.5, 56, 58, 60, 61.5, 63, 65, 67, 69, 71, 73, 75, 77.5, 80, 82.5, 85, 87.5, 90, 92.5, 95, 97.5, 100, 103, 106, 109, 112, 115, 118, 122, 125, 128, 132, 136, 140, 145, 150, 155, 160, 165, 170, 175, 180, 185, 190, 195, 200, 206, 212, 218, 224, 230, 236, 243, 250, 258, 265, 272, 280, 290, 300, 307, 315, 325, 335, 345, 355, 365, 375, 387, 400, 412, 425, 437, 450, 462, 475, 487, 500, 515, 530, 545, 560, 580, 600, 615, 630, 650, 670, 690, 710, 730, 750, 775, 800, 825, 850, 875, 900, 925, 950, 975, 1e3}
      solve for = {acpr4}

Solver configurations
  sol1 "Solution 1" (study std1)
    v1: Variables "Dependent Variables 1"
    s1: Stationary "Stationary Solver 1"
      dDef: Direct
      p1: Parametric
        pname = freq
        plistarr = {10, 10.3, 10.6, 10.9, 11.2, 11.5, 11.8, 12.2, 12.5, 12.8, 13.2, 13.6, 14, 14.5, 15, 15.5, 16, 16.5, 17, 17.5, 18, 18.5, 19, 19.5, 20, 20.6, 21.2, 21.8, 22.4, 23, 23.6, 24.3, 25, 25.8, 26.5, 27.2, 28, 29, 30, 30.7, 31.5, 32.5, 33.5, 34.5, 35.5, 36.5, 37.5, 38.7, 40, 41.2, 42.5, 43.7, 45, 46.2, 47.5, 48.7, 50, 51.5, 53, 54.5, 56, 58, 60, 61.5, 63, 65, 67, 69, 71, 73, 75, 77.5, 80, 82.5, 85, 87.5, 90, 92.5, 95, 97.5, 100, 103, 106, 109, 112, 115, 118, 122, 125, 128, 132, 136, 140, 145, 150, 155, 160, 165, 170, 175, 180, 185, 190, 195, 200, 206, 212, 218, 224, 230, 236, 243, 250, 258, 265, 272, 280, 290, 300, 307, 315, 325, 335, 345, 355, 365, 375, 387, 400, 412, 425, 437, 450, 462, 475, 487, 500, 515, 530, 545, 560, 580, 600, 615, 630, 650, 670, 690, 710, 730, 750, 775, 800, 825, 850, 875, 900, 925, 950, 975, 1e3}
        punit = Hz
        pcontinuationmode = no
      fc1: FullyCoupled | linsolver = dDef
  sol2 "Solution 2" (study std2)
    // same settings as sol1
  sol3 "Solution 3" (study std3)
    // same settings as sol1
  sol4 "Solution 4" (study std4)
    // same settings as sol1

Datasets
  dset1: Solution | solution = sol1
  rev1: Revolve2D "Revolution 2D 1" | data = dset1; startangle = -90; revangle = 225
  dset2: Solution | solution = sol2
  dset4: Solution | solution = sol3
  dset6: Solution | solution = sol4

Plots
  pg1: PlotGroup2D "Acoustic Pressure (acpr)" | data = dset1
    surf1: Surface | expr = acpr.p_t
  pg2: PlotGroup2D "Sound Pressure Level (acpr)" | data = dset1
    surf1: Surface | expr = acpr.Lp_t
  pg3: PlotGroup3D "Acoustic Pressure, 3D (acpr)" | data = rev1
    surf1: Surface | expr = acpr.p_t
  pg4: PlotGroup3D "Sound Pressure Level, 3D (acpr)" | data = rev1
    surf1: Surface | expr = acpr.Lp_t
  pg5: PlotGroup1D "Flanged pipe: Z_rad vs. f" | data = none; xlabel = f [Hz]; ylabel = Z_rad [Pa*s/m]
    ptgr1: PointGraph on points 2 | data = dset1; expr = real(acpr.Zi); legends = real(Z) with impedance model
    ptgr2: PointGraph on points 2 | data = dset1; expr = imag(acpr.Zi); legends = imag(Z) with impedance model
    glob1: Global | data = dset2; expr = intop1(p2)/intop1(acpr2.vz); unit = N*s/(m*m^2); descr = real(Z) with PML
    glob2: Global | data = dset2; expr = imag(intop1(p2)/intop1(acpr2.vz)); unit = N*s/(m*m^2); descr = imag(Z) with PML
  pg6: PlotGroup1D "Flanged pipe: Z_rad vs. k*a" | data = none; xlabel = k*a [-]; ylabel = Z_rad [Pa*s/m]
    ptgr1: PointGraph on points 2
      data = dset1
      expr = real(acpr.Zi)
      xdata = expr
      xdataexpr = acpr.omega/c_air*a
      legends = real(Z) with impedance model
    ptgr2: PointGraph on points 2
      data = dset1
      expr = imag(acpr.Zi)
      xdata = expr
      xdataexpr = acpr.omega/c_air*a
      legends = imag(Z) with impedance model
    glob1: Global
      data = dset2
      expr = intop1(p2)/intop1(acpr2.vz)
      unit = N*s/(m*m^2)
      descr = real(Z) with PML
      xdata = expr
      xdataexpr = acpr.omega/c_air*a
    glob2: Global
      data = dset2
      expr = imag(intop1(p2)/intop1(acpr2.vz))
      unit = N*s/(m*m^2)
      descr = imag(Z) with PML
      xdata = expr
      xdataexpr = acpr.omega/c_air*a
  pg7: PlotGroup1D "Unflanged pipe: Z_rad vs. f" | data = none; xlabel = f [Hz]; ylabel = Z_rad [Pa*s/m]
    ptgr1: PointGraph on points 2 | data = dset4; expr = real(acpr3.Zi); legends = real(Z) impedance model
    ptgr2: PointGraph on points 2 | data = dset4; expr = imag(acpr3.Zi); legends = imag(Z) impedance model
    glob1: Global | data = dset6; expr = intop2(p4)/intop2(acpr4.vz); unit = N*s/(m*m^2); descr = real(Z) with PML
    glob2: Global | data = dset6; expr = imag(intop2(p4)/intop2(acpr4.vz)); unit = N*s/(m*m^2); descr = imag(Z) with PML
  pg8: PlotGroup1D "Unflanged pipe: Z_rad vs. k*a" | data = none; xlabel = k*a [-]; ylabel = Z_rad [Pa*s/m]
    ptgr1: PointGraph on points 2
      data = dset4
      expr = real(acpr3.Zi)
      xdata = expr
      xdataexpr = acpr3.omega/c_air*a
      legends = real(Z) impedance model
    ptgr2: PointGraph on points 2
      data = dset4
      expr = imag(acpr3.Zi)
      xdata = expr
      xdataexpr = acpr3.omega/c_air*a
      legends = imag(Z) impedance model
    glob1: Global
      data = dset6
      expr = intop2(p4)/intop2(acpr4.vz)
      unit = N*s/(m*m^2)
      descr = real(Z) with PML
      xdata = expr
      xdataexpr = acpr4.omega/c_air*a
    glob2: Global
      data = dset6
      expr = imag(intop2(p4)/intop2(acpr4.vz))
      unit = N*s/(m*m^2)
      descr = imag(Z) with PML
      xdata = expr
      xdataexpr = acpr4.omega/c_air*a
  pg9: PlotGroup1D "Flanged pipe: centerline outlet pressure" | data = none
    ptgr1: PointGraph on points 2 | data = dset1; expr = real(acpr.p_t); legends = real(p) with impedance
    ptgr2: PointGraph on points 2 | data = dset1; expr = imag(acpr.p_t); legends = imag(p) with impedance
    ptgr3: PointGraph on points 2 | data = dset2; expr = real(acpr2.p_t); legends = real(p) with PML
    ptgr4: PointGraph on points 2 | data = dset2; expr = imag(acpr2.p_t); legends = imag(p) with PML
  pg10: PlotGroup1D "Unflanged pipe: centerline outlet pressure" | data = none
    ptgr1: PointGraph on points 2 | data = dset4; expr = real(acpr3.p_t); legends = real(p) with impedance
    ptgr2: PointGraph on points 2 | data = dset4; expr = imag(acpr3.p_t); legends = imag(p) with impedance
    ptgr3: PointGraph on points 2 | data = dset6; expr = real(acpr4.p_t); legends = real(p) with PML
    ptgr4: PointGraph on points 2 | data = dset6; expr = imag(acpr4.p_t); legends = imag(p) with PML