// COMSOL Multiphysics 6.0.0.318 model "cooling_solidification_metal.mph"
// Cooling and Solidification of Metal
// This is a model of a continuous casting process wherein liquid metal solidifies as it passes through a cooled mold. Phase change is modeled with the apparent heat capacity formulation, using mesh adaptation and the continuation method to facilitate solving the highly nonlinear stationary problem. The goal is to find the shape of the solidification front.
// Outline of the model tree

Parameters
  T_m = 1356[K]  // Melting temperature
  dT = 50[K]  // Temperature transition zone half width
  dH = 205[kJ/kg]  // Latent heat of solidification
  Cp_S = 380[J/(kg*K)]  // Heat capacity at constant pressure, solid phase
  Cp_L = 530[J/(kg*K)]  // Heat capacity at constant pressure, liquid phase
  T0 = 300[K]  // Ambient temperature
  T_in = 1473[K]  // Melt inlet temperature
  v_cast = 2.5[mm/s]  // Casting speed
  h_mold = 800[W/(m^2*K)]  // Heat transfer coefficient, mold
  h_spray = 200[W/(m^2*K)]  // Heat transfer coefficient, spray cooled region
  eps_s = 0.8  // Surface emissivity

Geometry
  geom1 "Geometry 1" (2D axisymmetric, length unit m)
    r1: Rectangle | size = {0.1, 0.6}
    r2: Rectangle | pos = {0, 0.6}; size = {0.1, 0.2}
    fin: Finalize "Form Union"

Materials
  mat1: Common "Solid Metal Alloy" on all domains
    def "Basic"
      thermalconductivity = 300
      density = 8500
      heatcapacity = Cp_S
  mat2: Common "Liquid Metal Alloy" on domains 1, 2
    def "Basic"
      thermalconductivity = 150
      density = 8500
      heatcapacity = Cp_L

Physics
  ht: HeatTransferInFluids on all domains
    dependent variable T
    fluid1: FluidHeatTransferModel "Fluid 1" (default) | u = {0, 0, -v_cast}
      phc1: PhaseChangeMaterial on all domains
        T_pc12 = T_m
        dT_pc12 = dT
        L_pc12 = dH
        MaterialPhase1 = mat1
        MaterialPhase2 = mat2
    init1: init "Initial Values 1" (default) | Tinit = T_in
    axi1: AxialSymmetry (default)
    ins1: ThermalInsulation (default)
    ifl1: Inflow on boundaries 5 | Tustr = T_in
    hf1: HeatFluxBoundary "Heat Flux 1" on boundaries 7 | HeatFluxType = ConvectiveHeatFlux; h = h_mold; Text = T0
    hf2: HeatFluxBoundary "Heat Flux 2" on boundaries 6 | HeatFluxType = ConvectiveHeatFlux; h = h_spray; Text = T0
    sar1: SurfaceToAmbientRadiation on boundaries 6 | epsilon_rad_mat = userdef; epsilon_rad = eps_s; Tamb = T0
    ofl1: ConvectiveOutflow "Outflow 1" on boundaries 2

Mesh
  mesh1 "Mesh 1" (physics-controlled)
    size: MeshSizeDefault | hauto = 1
  adaptmesh1 "Level 1 Adapted Mesh 1"
    size: MeshSizeDefault | hmax = 0.0536; hmin = 2.4E-4; hcurve = 0.3; hgrad = 1.3
    se1: SizeExpression on entire geometry
      evaltype = solution
      sizeexpr = 0.8
      cellsize = 0.032
      solution = sol3
      horder = 4
      solupdatenum = 2
    rf1: Reference | sequence = mesh1
      sca1: Scale on entire geometry | scale = 3
  adaptmesh2 "Level 2 Adapted Mesh 2"
    size: MeshSizeDefault | hmax = 0.0536; hmin = 2.4E-4; hcurve = 0.3; hgrad = 1.3
    se1: SizeExpression on entire geometry
      evaltype = solution
      sizeexpr = 0.8
      cellsize = 0.032
      solution = sol4
      horder = 4
      solupdatenum = 2
    rf1: Reference | sequence = mesh1
      sca1: Scale on entire geometry | scale = 3

Studies
  std1 "Study 1"
    stat: Stationary
      errestandadap = adaption
      meshadaptmethod = rebuild
      useparam = on
      pname = dT
      plistarr = 300 200 150 100 75
      punit = K
  std2 "Study 2"
    stat: Stationary
      useinitsol = on
      initmethod = sol
      initstudy = std1
      initsol = sol2
      useparam = on
      pname = dT
      plistarr = 50 25
      punit = K

Solver configurations
  sol1 "Solution 1" (study std1)
    v1: Variables "Dependent Variables 1"
    s1: Stationary "Stationary Solver 1"
      eeDef: ErrorEstimation
      adDef: Adaption "Adaptive Mesh Refinement"
      p1: Parametric
      fc1: FullyCoupled | linsolver = d1; initstep = 0.01; minstep = 1.0E-6; maxiter = 50
      d1: Direct "Direct, heat transfer variables (ht)" | linsolver = pardiso; pivotperturb = 1.0E-13
  sol2 "Adaptive Mesh Refinement Solutions 1" (study std1)
  sol6 "Solution 6" (study std2)
    v1: Variables "Dependent Variables 1"
    s1: Stationary "Stationary Solver 1" | stol = 1e-5
      p1: Parametric
      fc1: FullyCoupled | linsolver = d1; initstep = 0.01; minstep = 1.0E-6; maxiter = 50
      d1: Direct "Direct, heat transfer variables (ht)" | linsolver = pardiso; pivotperturb = 1.0E-13

Datasets
  dset1: Solution | solution = sol1
  dset2: Solution | solution = sol2
  dset3: Solution | solution = sol6

Plots
  pg1: PlotGroup2D "Solid and Liquid Phases (Adaptive Mesh)" | data = dset1
    surf1: Surface | expr = ht.theta1; descr = Phase indicator, phase 1
  pg2: PlotGroup2D "Solid and Liquid Phases" | data = dset3
    surf1: Surface | expr = ht.theta1; descr = Phase indicator, phase 1
  pg3: PlotGroup1D "Phase Indicator at Symmetry Axis" | data = dset1
    lngr1: LineGraph on boundaries 1, 3 | expr = ht.theta1; descr = Phase indicator, phase 1; xdata = expr; xdataexpr = z
    lngr2: LineGraph on boundaries 1, 3
      data = dset3
      expr = ht.theta1
      descr = Phase indicator, phase 1
      xdata = expr
      xdataexpr = z
  pg4: PlotGroup1D "Phase Indicator through Radius" | data = dset1
    lngr1: LineGraph on boundaries 4 | expr = ht.theta1; descr = Phase indicator, phase 1; xdata = expr; xdataexpr = r
    lngr2: LineGraph on boundaries 4
      data = dset3
      expr = ht.theta1
      descr = Phase indicator, phase 1
      xdata = expr
      xdataexpr = r