// COMSOL Multiphysics 6.0.0.318 model "sorbing_solute.mph"
// Variably Saturated Flow and Transport — Sorbing Solute
// In this example water ponded in a ring on the ground moves into a relatively dry soil column and carries a chemical with it. As it moves through the variably saturated soil column, the chemical attaches to solid particles, slowing the solute transport relative to the water. Additionally the chemical concentrations decay from biodegradation in both the liquid and the solid phase.
// Outline of the model tree

Parameters
  rhof = 1e3[kg/m^3]  // Fluid density
  rhob = 1400[kg/m^3]  // Bulk density
  poro_1 = 0.339  // Porosity, layer 1
  poro_2 = 0.399  // Porosity, layer 2
  thetar_1 = 0.001  // Residual liquid volume fraction, layer 1
  thetar_2 = 0.001  // Residual liquid volume fraction, layer 2
  Sp_1 = (poro_1-thetar_1)/(1[m]*g_const*rhof)  // Storage coefficient, layer 1
  Sp_2 = (poro_2-thetar_2)/(1[m]*g_const*rhof)  // Storage coefficient, layer 2
  Ks_1 = 0.454[m/d]  // Saturated hydraulic conductivity, layer 1
  Ks_2 = 0.298[m/d]  // Saturated hydraulic conductivity, layer 2
  alpha_1 = 1.39[1/m]  // Van Genuchten parameter alpha, layer 1
  alpha_2 = 1.74[1/m]  // Van Genuchten parameter alpha, layer 2
  n_1 = 1.6  // Van Genuchten parameter n, layer 1
  n_2 = 1.38  // Van Genuchten parameter n, layer 2
  Hp0 = 0.01[m]  // Pressure head in the ring
  kp = 1e-4[m^3/kg]  // Partition coefficient
  Dl = 3.74e-3[m^2/d]  // Diffusion coefficient
  phil = 0.05[1/d]  // Decay rate in liquid
  phip = 0.01[1/d]  // Decay rate in solid
  alphar = 0.005[m]  // Longitudinal dispersivity
  alphaz = 0.001[m]  // Transverse dispersivity
  c0 = 1[mol/m^3]  // Solute concentration in the ring

Coordinate systems
  ie1: InfiniteElement "Infinite Element Domain 1" on domains 3, 4 | ScalingType = Cylindrical

Geometry
  geom1 "Geometry 1" (2D axisymmetric, length unit m)
    r1: Rectangle
      pos = {0, -1.3}
      layername = Layer 1
      layer = 0.25
      layerright = on
      layerbottom = off
      size = {1.5, 0.9}
    r2: Rectangle
      pos = {0, -0.4}
      layername = Layer 1
      layer = 0.25
      layerright = on
      layerbottom = off
      size = {1.5, 0.4}
    pt1: Point | p = {0.25, }
    fin: Finalize "Form Union"

Materials
  pmat1: PorousMedia "Porous Material: Lower Layer" on all domains
    poro "Porous model"
      porosity = 1
    fluid1: Fluid
      def "Basic"
        density = rhof
      poro "Porous model"
        porosity = 1
    solid1: Solid
      def "Basic"
        density = rhob
      poro "Porous model"
        porosity = 1
  pmat2: PorousMedia "Porous Material: Upper Layer" on domains 2, 4
    // same settings as pmat1

Physics
  dl: PorousMediaFlowRichards "Richards' Equation" on all domains
    dependent variable p
    usporous1: UnsaturatedPorousMedium (default) | storageModelType = userdef; Sp = Sp_1
      fluid1: FluidPorousMedium "Fluid 1" (default) | fluid = dommat; fluidType = gasLiquid; gasConstantType = specificGC
      pm1: PorousMatrixPorousMedium "Porous Matrix 1" (default)
        permeabilityModelType = conductivity
        Ks = Ks_1
        theta_r = thetar_1
        alpha = alpha_1
        n = n_1
    axi1: AxialSymmetry (default)
    nf1: NoFlow (default)
    gr1: Gravity | GravityType = Elevation
    init1: init "Initial Values 1" (default) | InitType = Hp; Hp = -(z+1.2)
    usporous2: UnsaturatedPorousMedium on domains 2, 4 | storageModelType = userdef; Sp = Sp_2
      fluid1: FluidPorousMedium "Fluid 1" (default) | fluid = dommat; fluidType = gasLiquid; gasConstantType = specificGC
      pm1: PorousMatrixPorousMedium "Porous Matrix 1" (default)
        permeabilityModelType = conductivity
        Ks = Ks_2
        theta_r = thetar_2
        alpha = alpha_2
        n = n_2
    init2: init "Initial Values 2" on domains 2, 4 | InitType = Hp; Hp = -(z+1.2)-0.2*(z+0.4)
    ph1: PressureHead on boundaries 5 | Hp0 = Hp0
    pl1: PerviousLayer on boundaries 2, 8 | Hb = -2; Rb = 1/5[d]
  tds: DilutedSpeciesInPorousMedia "Transport of Diluted Species in Porous Media" on all domains
    dependent variable c
    porous1: PorousMedium (default)
      fluid1: FluidPorousMedium "Fluid 1" (default)
        fluid = dommat
        DiffusionCoefficientSource = mat
        tauF = 1
        DF_c = 1e-9[m^2/s]
        Dchem_c = 1e-9[m^2/s]
        FluidDiffusivityModelType = MillingtonAndQuirkModel
        MobilityModel = NernstEinstein
        ume = 1e-13[s*mol/kg]
      pm1: PorousMatrixPorousMedium "Porous Matrix 1" (default) | solid = dommat; rhob = 800[kg/m^3]; rhope = 1000[kg/m^3]
    axi1: AxialSymmetry (default)
    nflx1: NoFlux (default)
    init1: init "Initial Values 1" (default)
    usporous1: UnsaturatedPorousMedium on all domains
      liquid1: LiquidUnsaturatedPorousMedium "Liquid 1" (default)
        SaturationType = LiquidVolumeFraction
        theta_l = dl.theta_l
        FluidFractionTimeChange = TimeChangeInPressureHead
        Cm = dl.Cm
        dHpdt_src = root.comp1.dl.dHpdt
        u_src = root.comp1.dl.u
        DL_c = Dl
      gas1: GasUnsaturatedPorousMedium "Gas 1" (default)
      pm1: PorousMatrixPorousMedium "Porous Matrix 1" (default)
      ads1: Adsorptions "Adsorption 1" on all domains | species = 1; SorptionType = UserDefined; cP = kp*c
      disp1: Dispersion on all domains
        DispersionTensor = Dispersivity
        DispersivityModel = TransverseIsotropic
        alpha = {alphar, 0, alphaz}
    reac1: Reactions on all domains | R_c = (phip*kp*rhob-phil*dl.theta_l)*c
    out1: Outflow on boundaries 2, 8, 12, 13
    conc1: Concentration on boundaries 5 | species = 1; c0 = c0

Mesh
  mesh1 "Mesh 1"
    size: MeshSizeDefault | hmax = 0.0555; hmin = 1.88E-4; hcurve = 0.25; hgrad = 1.25; hauto = 3
    map1: Map "Mapped 1" on remaining entities
      size1: Size on domains 2 | hmax = 0.02; custom = on

Studies
  std1 "Study 1"
    time: Transient "Time Dependent" | tunit = d; tlist = range(0,0.1,0.9) range(1,1,100)

Solver configurations
  sol1 "Solution 1" (study std1)
    v1: Variables "Dependent Variables 1"
    t1: Time "Time-Dependent Solver 1"
      tlist = range(0,0.1,0.9) range(1,1,100)
      rtol = 0.005
      maxorder = 2
      stabcntrl = on
      fc1: FullyCoupled
        linsolver = d1
        maxiter = 8
        damp = 0.9
        jtech = once
        stabacc = aacc
        aaccdim = 5
        aaccmix = 0.9
        aaccdelay = 1
      d1: Direct "Direct, pressure (dl) (merged)" | linsolver = pardiso; pivotperturb = 1.0E-13

Datasets
  dset1: Solution on domains 1, 2 | solution = sol1
  rev1: Revolve2D "Revolution 2D" | data = dset1; startangle = -90; revangle = 225

Plots
  pg1: PlotGroup2D "Flownet (dl)" | data = dset1; dataisaxisym = on
    con1: Contour | expr = dl.H; levelrounding = off
    str1: Streamline on boundaries 1-13 | expr = {dl.u, dl.w}; madv = manual; minitref = 3
  pg2: PlotGroup2D "Pressure (dl)" | data = dset1; dataisaxisym = on
    surf1: Surface | expr = p
    str1: Streamline on boundaries 1-13 | expr = {dl.u, dl.w}; pointtype = arrow; arrowlength = logarithmic
  pg3: PlotGroup3D "Pressure, 3D (dl)" | data = rev1
    surf1: Surface | expr = p
  pg4: PlotGroup2D "Concentration (tds)" on domains 1-4 | data = dset1
    surf1: Surface | expr = c
    str1: Streamline (disabled) | expr = {tds.tflux_cr, tds.tflux_cz}; pointtype = arrow; arrowlength = logarithmic
    con1: Contour | expr = tds.RF_c; descr = Retardation factor; unitintitle = off
  pg5: PlotGroup3D "Concentration, 3D (tds)" | data = rev1; typeintitle = off
    surf1: Surface | expr = c
  pg6: PlotGroup2D "Retardation factor" | data = dset1
    surf1: Surface | expr = tds.RF_c; descr = Retardation factor; unitintitle = off
    str1: Streamline (disabled) | expr = {tds.tflux_cr, tds.tflux_cz}; pointtype = arrow; arrowlength = logarithmic
    con1: Contour | expr = tds.RF_c; descr = Retardation factor; unitintitle = off
  pg7: PlotGroup2D "Effective saturation" | data = dset1
    surf1: Surface | expr = dl.Se; descr = Effective saturation; unitintitle = off
    con1: Contour | expr = dl.Hp; descr = Pressure head
    arws1: ArrowSurface | expr = {dl.u, dl.w}; xnumber = 20; ynumber = 20

Exports
  anim1: Animation | target = player