// COMSOL Multiphysics 6.0.0.318 model "gaussian_pulse_absorbing_layers — копия.mph"
// Gaussian Pulse in 2D Uniform Flow: Convected Wave Equation and Absorbing Layers
// This small tutorial simulates a standard test and benchmark model for nonreflecting conditions and sponge layers for linearized Euler-like systems. It involves the propagation of a transient Gaussian pulse in a 2D uniform flow. The Convected Wave Equation, Time Explicit interface solves the linearized Euler equations with an adiabatic equation of state and the interface uses the Absorbing Layers feature to model infinite domains.
// An acoustic pulse is generated by an initial Gaussian distribution at the center of the computational domain. The pulse propagates in a high Mach number uniform flow. The analytical solution to the problem is used to validate the solution and it shows very good agreement.
// The model also illustrates how to set up and use the absorbing layers. By using absorbing layers, you can reduce spuriously reflected waves to 1/1000 of the incident field amplitude.
// Outline of the model tree
// Unit system: none

Parameters
  W = 100  // Domain width
  dW = 20  // Absorbing layer width
  c0 = 1  // Speed of sound
  rho0 = 1  // Background density
  p0 = 1[atm]/(c0^2*rho0)  // Background pressure
  alpha = log(2)/9  // Gaussian pulse width
  beta = 0.04  // Gaussian pulse velocity factor
  Ma = 0.5  // Mach number

Variables
  var1 "Variables 1"
    G = exp(-alpha*((x-a)^2+(y-b)^2))  // Gaussian
    u_i = c0*beta*x*G*0  // x-velocity initial condition
    v_i = c0*beta*y*G*0  // y-velocity initial condition
    p_i = rho0*c0^2*G  // Pressure initial condition
    r = sqrt((x-Ma*t)^2+y^2)  // Distance variables (moving frame)
    p_a = 1/(2*alpha)*integrate((cos(L*t)-beta/(2*alpha)*L*sin(L*t))*L*besselj(0,L*r)*exp(-L^2/(4*alpha)),L,0,10,1e-3)  // Analytical pressure expression
    a = 10
    b = 10

Coordinate systems
  ab1: AbsorbingLayer on domains 1-4, 6-9

Geometry
  geom1 "Geometry 1" (2D, length unit m)
    sq1: Square | base = center; layername = Layer 1; layer = dW; layerleft = on; layerright = on; layertop = on; size = W
    fin: Finalize "Form Union"

Physics
  cwe: ConvectedWaveEquation "Convected Wave Equation, Time Explicit" on all domains
    dependent variable p
    cwem1: ConvectedWaveEquationModel (default)
      minput_pressure = p0
      minput_velocity = {Ma*c0, 0, 0}
      rho0_mat = userdef
      rho0 = rho0
      c0_mat = userdef
      c0 = c0
    shw1: SoundHardWall (default)
    init1: init "Initial Values 1" (default) | p = p_i; u = {u_i, v_i, 0}
    imp1: AcousticImpedance on all boundaries

Mesh
  mesh1 "Mesh 1" (physics-controlled)
    size: MeshSizeDefault | hauto = 3

Studies
  std1 "Study 1"
    time: Transient "Time Dependent" | tlist = range(0,1,120)

Solver configurations
  sol1 "Solution 1" (study std1)
    v1: Variables "Dependent Variables 1"
    tx1: TimeExplicit "Time-Explicit Solver 1"
      tlist = range(0,1,120)
      tstepping = elemexprs
      exprs = {root.comp1.cwe.wtc, root.comp1.cwe.wtc}
      dDef: Direct
      fc1: FullyCoupled | linsolver = dDef

Datasets
  dset1: Solution | solution = sol1
  cpt1: CutPoint2D | data = dset1; pointx = 20; pointy = 10
  cln1: CutLine2D | data = dset1; genpoints = {{-50, 0}, {50, 0}}
  cln2: CutLine2D | data = dset1; genpoints = {{-30, 0}, {30, 0}}

Plots
  pg1: PlotGroup2D "Acoustic Pressure (cwe)" | data = dset1
    surf1: Surface "Acoustic Pressure" | expr = p
  pg2: PlotGroup2D "Acoustic Velocity (cwe)" | data = dset1
    surf1: Surface "Acoustic Velocity Amplitude" | expr = cwe.v_inst
    arws1: ArrowSurface "Acoustic Velocity" | expr = {u, v}
  pg3: PlotGroup2D "Background Mean Flow (cwe)" | data = dset1
    surf1: Surface "Background Mean Flow Pressure" | expr = cwe.p0
    arws1: ArrowSurface "Background Mean Flow Velocity" | expr = {cwe.u0x, cwe.u0y}; xnumber = 7; ynumber = 7
  pg4: PlotGroup1D "Pressure in Point" | data = cpt1
    ptgr1: PointGraph | expr = p; legends = COMSOL Model
    ptgr2: PointGraph | expr = p_a; legends = Analytical
  pg5: PlotGroup1D "Pressure over Cut Line" | data = none
    lngr1: LineGraph | data = cln1; expr = p; xdata = expr; xdataexpr = x; legends = COMSOL Model
    lngr2: LineGraph | data = cln2; expr = p_a; xdata = expr; xdataexpr = x; legends = Analytical
  pg6: PlotGroup2D "Acoustic Pressure (cwe) Selection" | data = dset1
    surf1: Surface "Acoustic Pressure" | expr = p
      sel1: Selection on domains 5

Exports
  anim1: Animation | target = player