// COMSOL Multiphysics 6.0.0.318 model "Another Griffits.mph"
// Outline of the model tree
// Unit system: none

Parameters
  h_size = 0.001

Functions
  gp1: GaussianPulse | location = 0.8; sigma = 0.1; normalization = peak
  an1: Analytic | expr = gp1(x)

Geometry
  geom1 "Geometry 1" (1D, length unit m)
    i1: Interval "center"
    fin: Finalize "Form Union"

Physics
  c: CoefficientFormPDE on all domains
    dependent variable u
    ShapeProperty.order = 1
    cfeq1: CoefficientFormPDE (default) | c = 1; f = 0; da = 1
    zflx1: ZeroFluxBoundary "Zero Flux 1" (default)
    init1: init "Initial Values 1" (default) | u = gp1(x)
  gb: GeneralFormBoundaryPDE on all boundaries
    dependent variable u
    gfeq1: GeneralFormPDE (default) | f = +uxt; Ga = 0; da = 1
    init1: init "Initial Values 1" (default) | u = gp1(x)

Mesh
  mesh1 "Mesh"
    size: MeshSizeDefault | hmax = h_size; hauto = 3; custom = on
    edg1: Edge on remaining entities

Studies
  std1 "Study"
    time: Transient "Time Dependent" | tlist = range(0,5.00500500501e-05,0.05)

Solver configurations
  sol1 "Solution 1" (study std1)
    v1: Variables "Dependent Variables 1"
    t1: Time "Time-Dependent Solver 1" | tlist = range(0,5.00500500501e-05,0.05)
      dDef: Direct
      fc1: FullyCoupled | linsolver = dDef

Datasets
  dset1: Solution | solution = sol1
  an1_ds1: Grid1D

Plots
  pg2: PlotGroup1D "Base plot group" | data = dset1; xlabel = x; ylabel = u
    lngr1: LineGraph "plot" on all domains | expr = u
    plot1: Function | data = an1_ds1; expr = an1(x)
  pg3: PlotGroup1D "Check symmetry" | data = dset1; xlabel = x; ylabel = u
    lngr1: LineGraph "plot" on all domains | expr = u
    plot1: Function | data = an1_ds1; expr = an1(x)

Exports
  anim1: Animation | target = player; maxframes = 100
  anim2: Animation | target = player; maxframes = 100