// COMSOL Multiphysics 6.0.0.318 model "Infinite domain.mph"
// Outline of the model tree
// Unit system: none

Parameters
  h_size = 1E-4
  l_center = 0.7

Functions
  gp1: GaussianPulse | location = l_center; sigma = 0.1; normalization = peak
  an1: Analytic "Distribution" | funcname = distr; expr = gp1(x)
  an2: Analytic "Source" | funcname = source; expr = 0

Variables
  var1 "Auxiliary add" (disabled)
    d = 0
    alpha = 0.2
    add1 = a1*d1*(u-g1)
    a1 = 2
    d1 = 1
    full_add = add1
    betta = 1

Coordinate systems
  ie1: InfiniteElement "Infinite Element Domain 1" (disabled) on domains 3
    ScalingType = userDefined
    stretchingType = userDefined
    function = an1
  pml1: PML "Perfectly Matched Layer 1" (disabled) on domains 3 | wavelengthSourceType = userDefined
  ab1: AbsorbingLayer on domains 3 | ScalingType = userDefined

Geometry
  geom1 "Geometry" (1D, length unit m)
    i1: Interval "center"
    pt1: Point | p = 0.08
    pt2: Point | p = 0.88
    fin: Finalize "Form Union"

Physics
  base: CoefficientFormPDE "Inside term" on all domains
    dependent variable u
    ShapeProperty.order = 1
    ShapeProperty.boundaryFlux = 0
    ShapeProperty.boundaryFluxSmooth = 1
    cfeq1: CoefficientFormPDE (default) | c = 1; f = source(x); da = 1
    zflx1: ZeroFluxBoundary "Zero Flux" (default)
    init1: init "Initial Values" (default) | u = distr(x)
    flux1: FluxBoundary "Transparent bc" (disabled) on all boundaries | g = - (alpha*(ut-uxx) + betta*u + full_add)
  aux: CoefficientFormBoundaryPDE "Auxiliary" (disabled) on all boundaries
    dependent variable g1
    ShapeProperty.order = 1
    cfeq1: CoefficientFormPDE (default) | c = 1; a = d; f = u; da = 1
    init1: init "Initial Values" (default)

Mesh
  mesh1 "Mesh"
    size: MeshSizeDefault | hmax = h_size; hauto = 3; custom = on
    edg1: Edge on remaining entities

Studies
  std1 "Study"
    time: Transient "Time Dependent" | tlist = range(0,0.000408163265306,0.02)

Solver configurations
  sol1 "Solution 1" (study std1)
    v1: Variables "Dependent Variables 1"
    t1: Time "Time-Dependent Solver 1" | tlist = range(0,0.000408163265306,0.02)
      dDef: Direct
      fc1: FullyCoupled | linsolver = dDef

Datasets
  dset1: Solution | solution = sol1
  an1_ds1: Grid1D

Plots
  pg2: PlotGroup1D "Base"
    data = dset1
    xlabel = x
    ylabel = u
    manualgrid = on
    xspacing = 0.1
    yspacing = 0.1
    axistrailingzeros = on
    axisprecision = 2
    lngr1: LineGraph "Solve plot" on all domains | expr = u
    plot1: Function "Distribution plot"
      data = an1_ds1
      expr = distr(x)
      typeintitle = off
      descriptionintitle = off
      unitintitle = off
  pg3: PlotGroup1D "Check symmetry" | data = dset1; xlabel = x; ylabel = u
    lngr1: LineGraph "plot" on all domains | expr = u
    plot1: Function | data = an1_ds1; expr = an1(x)

Exports
  anim1: Animation "Full plot" | target = player; maxframes = 100
  anim2: Animation "Symmetry plot" | target = player; maxframes = 100