// COMSOL Multiphysics 6.0.0.318 model "Transparent (hard) 2 aux.mph"
// Outline of the model tree
// Unit system: none

Parameters
  h_size = 1E-4
  l_center = 0.7
  betta = 1
  a1 = 1
  source = 0
  d = 0
  alpha = 0.2
  d1 = 1
  a2 = 0.1
  d2 = 0.1

Functions
  gp1: GaussianPulse | location = l_center; sigma = 0.1; normalization = peak
  an1: Analytic "Distri" | expr = gp1(x)

Geometry
  geom1 "Geometry 1" (1D, length unit m)
    i1: Interval "center"
    fin: Finalize "Form Union"

Physics
  base: CoefficientFormPDE "Inside term" on all domains
    dependent variable u
    ShapeProperty.order = 1
    ShapeProperty.boundaryFlux = 0
    ShapeProperty.boundaryFluxSmooth = 1
    cfeq1: CoefficientFormPDE (default) | c = 1; f = source; da = 1
    zflx1: ZeroFluxBoundary "Zero Flux 1" (default)
    init1: init "Initial Values 1" (default) | u = gp1(x)
    flux1: FluxBoundary "Flux/Source 1" on all boundaries | g = - (alpha*(ut-uxx) + betta*u + a1*d1*(u-g1)+ a2*d2*(u-g2))
  aux: CoefficientFormBoundaryPDE "Auxiliary" on all boundaries
    dependent variable g = {g1, g2}
    ShapeProperty.order = 1
    cfeq1: CoefficientFormPDE (default) | c = {1, 0, 0, 1}; a = {d, 0, 0, d}; f = {u, u}; da = {1, 0, 0, 1}
    init1: init "Initial Values 1" (default)

Mesh
  mesh1 "Mesh"
    size: MeshSizeDefault | hmax = h_size; hauto = 3; custom = on
    edg1: Edge on remaining entities

Studies
  std1 "Study"
    time: Transient "Time Dependent" | tlist = range(0,0.00020202020202,0.02)

Solver configurations
  sol1 "Solution 1" (study std1)
    v1: Variables "Dependent Variables 1"
    t1: Time "Time-Dependent Solver 1" | tlist = range(0,0.00020202020202,0.02)
      dDef: Direct
      fc1: FullyCoupled | linsolver = dDef

Datasets
  dset1: Solution | solution = sol1
  an1_ds1: Grid1D

Plots
  pg2: PlotGroup1D "Base plot group"
    data = dset1
    xlabel = x
    ylabel = u
    manualgrid = on
    xspacing = 0.1
    yspacing = 0.1
    axistrailingzeros = on
    axisprecision = 2
    lngr1: LineGraph "plot" on all domains | expr = u
    plot1: Function | data = an1_ds1; expr = an1(x)
  pg3: PlotGroup1D "Check symmetry" | data = dset1; xlabel = x; ylabel = u
    lngr1: LineGraph "plot" on all domains | expr = u
    plot1: Function | data = an1_ds1; expr = an1(x)

Exports
  anim1: Animation "Full plot" | target = player; maxframes = 100
  anim2: Animation "Symmetry plot" | target = player; maxframes = 100