// COMSOL Multiphysics 6.0.0.318 model "System.mph"
// Outline of the model tree
// Unit system: none

Parameters
  Ke = 1E+9
  KH = 1000000000
  Kr = 1000000000
  Kdisp = 1000000000
  KqH = 2000
  Ks = 2
  Kd = 0.05
  Kc = 1
  Kp = 0.001
  KrD = 1000000000
  Kph = 1E-05
  light = 0.0001

Physics
  reaction: ReactionEng "Reaction Engineering"
    reactor.reactor = batchvol
    reactor.Vr = 1
    energybalance.T = 1
    mixture.mixture = liquid
    calcTransport.calcTransport = 0
    inits1: SpeciesInitialValue "Initial Values" | initialValue = {0, 1, 0, 1, 0, 0, 0, 0, 0, 0}
    Q: SpeciesChem "Species: Q"
      sisDef = 1
      sType = volumetric
      sSequenceNo = 4
      SpeciesSource = Reaction
      specLabel = Q
      Tlo = 300[K]
      Tmid = 1000[K]
      Thi = 5000[K]
      h = R_const*((reaction.T<=reaction.Tlo_Q)*(reaction.aLo6_Q+reaction.Tlo_Q*(reaction.aLo1_Q+0.5*reaction.Tlo_Q*(reaction.aLo2_Q+2*reaction.Tlo_Q*(reaction.aLo3_Q+0.75*reaction.Tlo_Q*(reaction.aLo4_Q+0.8*reaction.Tlo_Q*reaction.aLo5_Q))/3)))+(reaction.T>reaction.Tlo_Q)*(reaction.T<=reaction.Tmid_Q)*(reaction.aLo6_Q+reaction.T*(reaction.aLo1_Q+0.5*reaction.T*(reaction.aLo2_Q+2*reaction.T*(reaction.aLo3_Q+0.75*reaction.T*(reaction.aLo4_Q+0.8*reaction.T*reaction.aLo5_Q))/3)))+(reaction.T>reaction.Tmid_Q)*(reaction.T<=reaction.Thi_Q)*(reaction.aHi6_Q+reaction.T*(reaction.aHi1_Q+0.5*reaction.T*(reaction.aHi2_Q+2*reaction.T*(reaction.aHi3_Q+0.75*reaction.T*(reaction.aHi4_Q+0.8*reaction.T*reaction.aHi5_Q))/3)))+(reaction.T>reaction.Thi_Q)*(reaction.aHi6_Q+reaction.Thi_Q*(reaction.aHi1_Q+0.5*reaction.Thi_Q*(reaction.aHi2_Q+2*reaction.Thi_Q*(reaction.aHi3_Q+0.75*reaction.Thi_Q*(reaction.aHi4_Q+0.8*reaction.Thi_Q*reaction.aHi5_Q))/3))))
      s = R_const*((reaction.T<=reaction.Tlo_Q)*(reaction.aLo7_Q+reaction.aLo1_Q*log(reaction.T/1[K])+reaction.Tlo_Q*(reaction.aLo2_Q+0.5*reaction.Tlo_Q*(reaction.aLo3_Q+2*reaction.Tlo_Q*(reaction.aLo4_Q+0.75*reaction.Tlo_Q*reaction.aLo5_Q)/3)))+(reaction.T>reaction.Tlo_Q)*(reaction.T<=reaction.Tmid_Q)*(reaction.aLo7_Q+reaction.aLo1_Q*log(reaction.T/1[K])+reaction.T*(reaction.aLo2_Q+0.5*reaction.T*(reaction.aLo3_Q+2*reaction.T*(reaction.aLo4_Q+0.75*reaction.T*reaction.aLo5_Q)/3)))+(reaction.T>reaction.Tmid_Q)*(reaction.T<=reaction.Thi_Q)*(reaction.aHi7_Q+reaction.aHi1_Q*log(reaction.T/1[K])+reaction.T*(reaction.aHi2_Q+0.5*reaction.T*(reaction.aHi3_Q+2*reaction.T*(reaction.aHi4_Q+0.75*reaction.T*reaction.aHi5_Q)/3)))+(reaction.T>reaction.Thi_Q)*(reaction.aHi7_Q+reaction.aHi1_Q*log(reaction.T/1[K])+reaction.Thi_Q*(reaction.aHi2_Q+0.5*reaction.Thi_Q*(reaction.aHi3_Q+2*reaction.Thi_Q*(reaction.aHi4_Q+0.75*reaction.Thi_Q*reaction.aHi5_Q)/3))))
      Cp = R_const*((reaction.T<=reaction.Tlo_Q)*(reaction.aLo1_Q+reaction.Tlo_Q*(reaction.aLo2_Q+reaction.Tlo_Q*(reaction.aLo3_Q+reaction.Tlo_Q*(reaction.aLo4_Q+reaction.Tlo_Q*reaction.aLo5_Q))))+(reaction.T>reaction.Tlo_Q)*(reaction.T<=reaction.Tmid_Q)*(reaction.aLo1_Q+reaction.T*(reaction.aLo2_Q+reaction.T*(reaction.aLo3_Q+reaction.T*(reaction.aLo4_Q+reaction.T*reaction.aLo5_Q))))+(reaction.T>reaction.Tmid_Q)*(reaction.T<=reaction.Thi_Q)*(reaction.aHi1_Q+reaction.T*(reaction.aHi2_Q+reaction.T*(reaction.aHi3_Q+reaction.T*(reaction.aHi4_Q+reaction.T*reaction.aHi5_Q))))+(reaction.T>reaction.Thi_Q)*(reaction.aHi1_Q+reaction.Thi_Q*(reaction.aHi2_Q+reaction.Thi_Q*(reaction.aHi3_Q+reaction.Thi_Q*(reaction.aHi4_Q+reaction.Thi_Q*reaction.aHi5_Q)))))
      sigma = 3.458[angstrom]
      epsilonkb = 107.4[K]
      mu = 0[C*m]
      ActivityCoefficient = 1
      speciesEnthalpy = NASA
      ReactionTagInSpecies = {rch1, rch5, rch6, rch7, rch8}
      updatefeat = 1
      GasThermalConductivitySel = Automatic
      GasDiffusivitySel = Automatic
      LiquidDiffusivitySel = Automatic
      k = 0.02[W/(m*K)]
      De = 1e-5[m^2/s]
      SpeciesrateSelection = Automatic
      specName = Q
      R = -reaction.r_1-reaction.r_5-reaction.r_6-reaction.r_7+reaction.r_8
      Speciesrate = 0[mol/(m^3*s)]
      SpeciesrateSurf = 0[mol/(m^2*s)]
      Speciessurfacerate = 0[mol/(m^2*s)]
      typeGUIControl = volumetric
      mixtureSolvent = 1
      Dgas = 10^-5[m^2/s]
      Dliquid = 10^-8[m^2/s]
      kgas = 0.015[W/(m*K)]
      MolarMassSelection = Thermodynamics
      M = 0.0[kg/mol]
      liquidDensitySel = Thermodynamics
      rho = 1000[kg/m^3]
      LiquidThermalConductivitySel = Thermodynamics
    DH: SpeciesChem "Species: DH"
      sisDef = 1
      sType = volumetric
      sSequenceNo = 5
      SpeciesSource = Reaction
      specLabel = DH
      Tlo = 300[K]
      Tmid = 1000[K]
      Thi = 5000[K]
      h = R_const*((reaction.T<=reaction.Tlo_DH)*(reaction.aLo6_DH+reaction.Tlo_DH*(reaction.aLo1_DH+0.5*reaction.Tlo_DH*(reaction.aLo2_DH+2*reaction.Tlo_DH*(reaction.aLo3_DH+0.75*reaction.Tlo_DH*(reaction.aLo4_DH+0.8*reaction.Tlo_DH*reaction.aLo5_DH))/3)))+(reaction.T>reaction.Tlo_DH)*(reaction.T<=reaction.Tmid_DH)*(reaction.aLo6_DH+reaction.T*(reaction.aLo1_DH+0.5*reaction.T*(reaction.aLo2_DH+2*reaction.T*(reaction.aLo3_DH+0.75*reaction.T*(reaction.aLo4_DH+0.8*reaction.T*reaction.aLo5_DH))/3)))+(reaction.T>reaction.Tmid_DH)*(reaction.T<=reaction.Thi_DH)*(reaction.aHi6_DH+reaction.T*(reaction.aHi1_DH+0.5*reaction.T*(reaction.aHi2_DH+2*reaction.T*(reaction.aHi3_DH+0.75*reaction.T*(reaction.aHi4_DH+0.8*reaction.T*reaction.aHi5_DH))/3)))+(reaction.T>reaction.Thi_DH)*(reaction.aHi6_DH+reaction.Thi_DH*(reaction.aHi1_DH+0.5*reaction.Thi_DH*(reaction.aHi2_DH+2*reaction.Thi_DH*(reaction.aHi3_DH+0.75*reaction.Thi_DH*(reaction.aHi4_DH+0.8*reaction.Thi_DH*reaction.aHi5_DH))/3))))
      s = R_const*((reaction.T<=reaction.Tlo_DH)*(reaction.aLo7_DH+reaction.aLo1_DH*log(reaction.T/1[K])+reaction.Tlo_DH*(reaction.aLo2_DH+0.5*reaction.Tlo_DH*(reaction.aLo3_DH+2*reaction.Tlo_DH*(reaction.aLo4_DH+0.75*reaction.Tlo_DH*reaction.aLo5_DH)/3)))+(reaction.T>reaction.Tlo_DH)*(reaction.T<=reaction.Tmid_DH)*(reaction.aLo7_DH+reaction.aLo1_DH*log(reaction.T/1[K])+reaction.T*(reaction.aLo2_DH+0.5*reaction.T*(reaction.aLo3_DH+2*reaction.T*(reaction.aLo4_DH+0.75*reaction.T*reaction.aLo5_DH)/3)))+(reaction.T>reaction.Tmid_DH)*(reaction.T<=reaction.Thi_DH)*(reaction.aHi7_DH+reaction.aHi1_DH*log(reaction.T/1[K])+reaction.T*(reaction.aHi2_DH+0.5*reaction.T*(reaction.aHi3_DH+2*reaction.T*(reaction.aHi4_DH+0.75*reaction.T*reaction.aHi5_DH)/3)))+(reaction.T>reaction.Thi_DH)*(reaction.aHi7_DH+reaction.aHi1_DH*log(reaction.T/1[K])+reaction.Thi_DH*(reaction.aHi2_DH+0.5*reaction.Thi_DH*(reaction.aHi3_DH+2*reaction.Thi_DH*(reaction.aHi4_DH+0.75*reaction.Thi_DH*reaction.aHi5_DH)/3))))
      Cp = R_const*((reaction.T<=reaction.Tlo_DH)*(reaction.aLo1_DH+reaction.Tlo_DH*(reaction.aLo2_DH+reaction.Tlo_DH*(reaction.aLo3_DH+reaction.Tlo_DH*(reaction.aLo4_DH+reaction.Tlo_DH*reaction.aLo5_DH))))+(reaction.T>reaction.Tlo_DH)*(reaction.T<=reaction.Tmid_DH)*(reaction.aLo1_DH+reaction.T*(reaction.aLo2_DH+reaction.T*(reaction.aLo3_DH+reaction.T*(reaction.aLo4_DH+reaction.T*reaction.aLo5_DH))))+(reaction.T>reaction.Tmid_DH)*(reaction.T<=reaction.Thi_DH)*(reaction.aHi1_DH+reaction.T*(reaction.aHi2_DH+reaction.T*(reaction.aHi3_DH+reaction.T*(reaction.aHi4_DH+reaction.T*reaction.aHi5_DH))))+(reaction.T>reaction.Thi_DH)*(reaction.aHi1_DH+reaction.Thi_DH*(reaction.aHi2_DH+reaction.Thi_DH*(reaction.aHi3_DH+reaction.Thi_DH*(reaction.aHi4_DH+reaction.Thi_DH*reaction.aHi5_DH)))))
      sigma = 3.458[angstrom]
      epsilonkb = 107.4[K]
      mu = 0[C*m]
      ActivityCoefficient = 1
      speciesEnthalpy = NASA
      ReactionTagInSpecies = rch1
      updatefeat = 1
      GasThermalConductivitySel = Automatic
      GasDiffusivitySel = Automatic
      LiquidDiffusivitySel = Automatic
      k = 0.02[W/(m*K)]
      De = 1e-5[m^2/s]
      SpeciesrateSelection = Automatic
      specName = DH
      R = -reaction.r_1
      Speciesrate = 0[mol/(m^3*s)]
      SpeciesrateSurf = 0[mol/(m^2*s)]
      Speciessurfacerate = 0[mol/(m^2*s)]
      typeGUIControl = volumetric
      mixtureSolvent = 1
      Dgas = 10^-5[m^2/s]
      Dliquid = 10^-8[m^2/s]
      kgas = 0.015[W/(m*K)]
      MolarMassSelection = Thermodynamics
      M = 0.0[kg/mol]
      liquidDensitySel = Thermodynamics
      rho = 1000[kg/m^3]
      LiquidThermalConductivitySel = Thermodynamics
    Qm: SpeciesChem "Species: Qm"
      sisDef = 1
      sType = volumetric
      sSequenceNo = 6
      SpeciesSource = Reaction
      specLabel = Qm
      Tlo = 300[K]
      Tmid = 1000[K]
      Thi = 5000[K]
      h = R_const*((reaction.T<=reaction.Tlo_Qm)*(reaction.aLo6_Qm+reaction.Tlo_Qm*(reaction.aLo1_Qm+0.5*reaction.Tlo_Qm*(reaction.aLo2_Qm+2*reaction.Tlo_Qm*(reaction.aLo3_Qm+0.75*reaction.Tlo_Qm*(reaction.aLo4_Qm+0.8*reaction.Tlo_Qm*reaction.aLo5_Qm))/3)))+(reaction.T>reaction.Tlo_Qm)*(reaction.T<=reaction.Tmid_Qm)*(reaction.aLo6_Qm+reaction.T*(reaction.aLo1_Qm+0.5*reaction.T*(reaction.aLo2_Qm+2*reaction.T*(reaction.aLo3_Qm+0.75*reaction.T*(reaction.aLo4_Qm+0.8*reaction.T*reaction.aLo5_Qm))/3)))+(reaction.T>reaction.Tmid_Qm)*(reaction.T<=reaction.Thi_Qm)*(reaction.aHi6_Qm+reaction.T*(reaction.aHi1_Qm+0.5*reaction.T*(reaction.aHi2_Qm+2*reaction.T*(reaction.aHi3_Qm+0.75*reaction.T*(reaction.aHi4_Qm+0.8*reaction.T*reaction.aHi5_Qm))/3)))+(reaction.T>reaction.Thi_Qm)*(reaction.aHi6_Qm+reaction.Thi_Qm*(reaction.aHi1_Qm+0.5*reaction.Thi_Qm*(reaction.aHi2_Qm+2*reaction.Thi_Qm*(reaction.aHi3_Qm+0.75*reaction.Thi_Qm*(reaction.aHi4_Qm+0.8*reaction.Thi_Qm*reaction.aHi5_Qm))/3))))
      s = R_const*((reaction.T<=reaction.Tlo_Qm)*(reaction.aLo7_Qm+reaction.aLo1_Qm*log(reaction.T/1[K])+reaction.Tlo_Qm*(reaction.aLo2_Qm+0.5*reaction.Tlo_Qm*(reaction.aLo3_Qm+2*reaction.Tlo_Qm*(reaction.aLo4_Qm+0.75*reaction.Tlo_Qm*reaction.aLo5_Qm)/3)))+(reaction.T>reaction.Tlo_Qm)*(reaction.T<=reaction.Tmid_Qm)*(reaction.aLo7_Qm+reaction.aLo1_Qm*log(reaction.T/1[K])+reaction.T*(reaction.aLo2_Qm+0.5*reaction.T*(reaction.aLo3_Qm+2*reaction.T*(reaction.aLo4_Qm+0.75*reaction.T*reaction.aLo5_Qm)/3)))+(reaction.T>reaction.Tmid_Qm)*(reaction.T<=reaction.Thi_Qm)*(reaction.aHi7_Qm+reaction.aHi1_Qm*log(reaction.T/1[K])+reaction.T*(reaction.aHi2_Qm+0.5*reaction.T*(reaction.aHi3_Qm+2*reaction.T*(reaction.aHi4_Qm+0.75*reaction.T*reaction.aHi5_Qm)/3)))+(reaction.T>reaction.Thi_Qm)*(reaction.aHi7_Qm+reaction.aHi1_Qm*log(reaction.T/1[K])+reaction.Thi_Qm*(reaction.aHi2_Qm+0.5*reaction.Thi_Qm*(reaction.aHi3_Qm+2*reaction.Thi_Qm*(reaction.aHi4_Qm+0.75*reaction.Thi_Qm*reaction.aHi5_Qm)/3))))
      Cp = R_const*((reaction.T<=reaction.Tlo_Qm)*(reaction.aLo1_Qm+reaction.Tlo_Qm*(reaction.aLo2_Qm+reaction.Tlo_Qm*(reaction.aLo3_Qm+reaction.Tlo_Qm*(reaction.aLo4_Qm+reaction.Tlo_Qm*reaction.aLo5_Qm))))+(reaction.T>reaction.Tlo_Qm)*(reaction.T<=reaction.Tmid_Qm)*(reaction.aLo1_Qm+reaction.T*(reaction.aLo2_Qm+reaction.T*(reaction.aLo3_Qm+reaction.T*(reaction.aLo4_Qm+reaction.T*reaction.aLo5_Qm))))+(reaction.T>reaction.Tmid_Qm)*(reaction.T<=reaction.Thi_Qm)*(reaction.aHi1_Qm+reaction.T*(reaction.aHi2_Qm+reaction.T*(reaction.aHi3_Qm+reaction.T*(reaction.aHi4_Qm+reaction.T*reaction.aHi5_Qm))))+(reaction.T>reaction.Thi_Qm)*(reaction.aHi1_Qm+reaction.Thi_Qm*(reaction.aHi2_Qm+reaction.Thi_Qm*(reaction.aHi3_Qm+reaction.Thi_Qm*(reaction.aHi4_Qm+reaction.Thi_Qm*reaction.aHi5_Qm)))))
      sigma = 3.458[angstrom]
      epsilonkb = 107.4[K]
      mu = 0[C*m]
      ActivityCoefficient = 1
      speciesEnthalpy = NASA
      ReactionTagInSpecies = {rch1, rch2}
      updatefeat = 1
      GasThermalConductivitySel = Automatic
      GasDiffusivitySel = Automatic
      LiquidDiffusivitySel = Automatic
      k = 0.02[W/(m*K)]
      De = 1e-5[m^2/s]
      SpeciesrateSelection = Automatic
      specName = Qm
      R = reaction.r_1-reaction.r_2
      Speciesrate = 0[mol/(m^3*s)]
      SpeciesrateSurf = 0[mol/(m^2*s)]
      Speciessurfacerate = 0[mol/(m^2*s)]
      typeGUIControl = volumetric
      mixtureSolvent = 1
      Dgas = 10^-5[m^2/s]
      Dliquid = 10^-8[m^2/s]
      kgas = 0.015[W/(m*K)]
      MolarMassSelection = Thermodynamics
      M = 0.0[kg/mol]
      liquidDensitySel = Thermodynamics
      rho = 1000[kg/m^3]
      LiquidThermalConductivitySel = Thermodynamics
    DHp: SpeciesChem "Species: DHp"
      sisDef = 1
      sType = volumetric
      sSequenceNo = 7
      SpeciesSource = Reaction
      specLabel = DHp
      Tlo = 300[K]
      Tmid = 1000[K]
      Thi = 5000[K]
      h = R_const*((reaction.T<=reaction.Tlo_DHp)*(reaction.aLo6_DHp+reaction.Tlo_DHp*(reaction.aLo1_DHp+0.5*reaction.Tlo_DHp*(reaction.aLo2_DHp+2*reaction.Tlo_DHp*(reaction.aLo3_DHp+0.75*reaction.Tlo_DHp*(reaction.aLo4_DHp+0.8*reaction.Tlo_DHp*reaction.aLo5_DHp))/3)))+(reaction.T>reaction.Tlo_DHp)*(reaction.T<=reaction.Tmid_DHp)*(reaction.aLo6_DHp+reaction.T*(reaction.aLo1_DHp+0.5*reaction.T*(reaction.aLo2_DHp+2*reaction.T*(reaction.aLo3_DHp+0.75*reaction.T*(reaction.aLo4_DHp+0.8*reaction.T*reaction.aLo5_DHp))/3)))+(reaction.T>reaction.Tmid_DHp)*(reaction.T<=reaction.Thi_DHp)*(reaction.aHi6_DHp+reaction.T*(reaction.aHi1_DHp+0.5*reaction.T*(reaction.aHi2_DHp+2*reaction.T*(reaction.aHi3_DHp+0.75*reaction.T*(reaction.aHi4_DHp+0.8*reaction.T*reaction.aHi5_DHp))/3)))+(reaction.T>reaction.Thi_DHp)*(reaction.aHi6_DHp+reaction.Thi_DHp*(reaction.aHi1_DHp+0.5*reaction.Thi_DHp*(reaction.aHi2_DHp+2*reaction.Thi_DHp*(reaction.aHi3_DHp+0.75*reaction.Thi_DHp*(reaction.aHi4_DHp+0.8*reaction.Thi_DHp*reaction.aHi5_DHp))/3))))
      s = R_const*((reaction.T<=reaction.Tlo_DHp)*(reaction.aLo7_DHp+reaction.aLo1_DHp*log(reaction.T/1[K])+reaction.Tlo_DHp*(reaction.aLo2_DHp+0.5*reaction.Tlo_DHp*(reaction.aLo3_DHp+2*reaction.Tlo_DHp*(reaction.aLo4_DHp+0.75*reaction.Tlo_DHp*reaction.aLo5_DHp)/3)))+(reaction.T>reaction.Tlo_DHp)*(reaction.T<=reaction.Tmid_DHp)*(reaction.aLo7_DHp+reaction.aLo1_DHp*log(reaction.T/1[K])+reaction.T*(reaction.aLo2_DHp+0.5*reaction.T*(reaction.aLo3_DHp+2*reaction.T*(reaction.aLo4_DHp+0.75*reaction.T*reaction.aLo5_DHp)/3)))+(reaction.T>reaction.Tmid_DHp)*(reaction.T<=reaction.Thi_DHp)*(reaction.aHi7_DHp+reaction.aHi1_DHp*log(reaction.T/1[K])+reaction.T*(reaction.aHi2_DHp+0.5*reaction.T*(reaction.aHi3_DHp+2*reaction.T*(reaction.aHi4_DHp+0.75*reaction.T*reaction.aHi5_DHp)/3)))+(reaction.T>reaction.Thi_DHp)*(reaction.aHi7_DHp+reaction.aHi1_DHp*log(reaction.T/1[K])+reaction.Thi_DHp*(reaction.aHi2_DHp+0.5*reaction.Thi_DHp*(reaction.aHi3_DHp+2*reaction.Thi_DHp*(reaction.aHi4_DHp+0.75*reaction.Thi_DHp*reaction.aHi5_DHp)/3))))
      Cp = R_const*((reaction.T<=reaction.Tlo_DHp)*(reaction.aLo1_DHp+reaction.Tlo_DHp*(reaction.aLo2_DHp+reaction.Tlo_DHp*(reaction.aLo3_DHp+reaction.Tlo_DHp*(reaction.aLo4_DHp+reaction.Tlo_DHp*reaction.aLo5_DHp))))+(reaction.T>reaction.Tlo_DHp)*(reaction.T<=reaction.Tmid_DHp)*(reaction.aLo1_DHp+reaction.T*(reaction.aLo2_DHp+reaction.T*(reaction.aLo3_DHp+reaction.T*(reaction.aLo4_DHp+reaction.T*reaction.aLo5_DHp))))+(reaction.T>reaction.Tmid_DHp)*(reaction.T<=reaction.Thi_DHp)*(reaction.aHi1_DHp+reaction.T*(reaction.aHi2_DHp+reaction.T*(reaction.aHi3_DHp+reaction.T*(reaction.aHi4_DHp+reaction.T*reaction.aHi5_DHp))))+(reaction.T>reaction.Thi_DHp)*(reaction.aHi1_DHp+reaction.Thi_DHp*(reaction.aHi2_DHp+reaction.Thi_DHp*(reaction.aHi3_DHp+reaction.Thi_DHp*(reaction.aHi4_DHp+reaction.Thi_DHp*reaction.aHi5_DHp)))))
      sigma = 3.458[angstrom]
      epsilonkb = 107.4[K]
      mu = 0[C*m]
      ActivityCoefficient = 1
      speciesEnthalpy = NASA
      ReactionTagInSpecies = {rch1, rch2}
      updatefeat = 1
      GasThermalConductivitySel = Automatic
      GasDiffusivitySel = Automatic
      LiquidDiffusivitySel = Automatic
      k = 0.02[W/(m*K)]
      De = 1e-5[m^2/s]
      SpeciesrateSelection = Automatic
      specName = DHp
      R = reaction.r_1-reaction.r_2
      Speciesrate = 0[mol/(m^3*s)]
      SpeciesrateSurf = 0[mol/(m^2*s)]
      Speciessurfacerate = 0[mol/(m^2*s)]
      typeGUIControl = volumetric
      mixtureSolvent = 1
      Dgas = 10^-5[m^2/s]
      Dliquid = 10^-8[m^2/s]
      kgas = 0.015[W/(m*K)]
      MolarMassSelection = Thermodynamics
      M = 0.0[kg/mol]
      liquidDensitySel = Thermodynamics
      rho = 1000[kg/m^3]
      LiquidThermalConductivitySel = Thermodynamics
    QH: SpeciesChem "Species: QH"
      sisDef = 1
      sType = volumetric
      sSequenceNo = 8
      SpeciesSource = Reaction
      specLabel = QH
      Tlo = 300[K]
      Tmid = 1000[K]
      Thi = 5000[K]
      h = R_const*((reaction.T<=reaction.Tlo_QH)*(reaction.aLo6_QH+reaction.Tlo_QH*(reaction.aLo1_QH+0.5*reaction.Tlo_QH*(reaction.aLo2_QH+2*reaction.Tlo_QH*(reaction.aLo3_QH+0.75*reaction.Tlo_QH*(reaction.aLo4_QH+0.8*reaction.Tlo_QH*reaction.aLo5_QH))/3)))+(reaction.T>reaction.Tlo_QH)*(reaction.T<=reaction.Tmid_QH)*(reaction.aLo6_QH+reaction.T*(reaction.aLo1_QH+0.5*reaction.T*(reaction.aLo2_QH+2*reaction.T*(reaction.aLo3_QH+0.75*reaction.T*(reaction.aLo4_QH+0.8*reaction.T*reaction.aLo5_QH))/3)))+(reaction.T>reaction.Tmid_QH)*(reaction.T<=reaction.Thi_QH)*(reaction.aHi6_QH+reaction.T*(reaction.aHi1_QH+0.5*reaction.T*(reaction.aHi2_QH+2*reaction.T*(reaction.aHi3_QH+0.75*reaction.T*(reaction.aHi4_QH+0.8*reaction.T*reaction.aHi5_QH))/3)))+(reaction.T>reaction.Thi_QH)*(reaction.aHi6_QH+reaction.Thi_QH*(reaction.aHi1_QH+0.5*reaction.Thi_QH*(reaction.aHi2_QH+2*reaction.Thi_QH*(reaction.aHi3_QH+0.75*reaction.Thi_QH*(reaction.aHi4_QH+0.8*reaction.Thi_QH*reaction.aHi5_QH))/3))))
      s = R_const*((reaction.T<=reaction.Tlo_QH)*(reaction.aLo7_QH+reaction.aLo1_QH*log(reaction.T/1[K])+reaction.Tlo_QH*(reaction.aLo2_QH+0.5*reaction.Tlo_QH*(reaction.aLo3_QH+2*reaction.Tlo_QH*(reaction.aLo4_QH+0.75*reaction.Tlo_QH*reaction.aLo5_QH)/3)))+(reaction.T>reaction.Tlo_QH)*(reaction.T<=reaction.Tmid_QH)*(reaction.aLo7_QH+reaction.aLo1_QH*log(reaction.T/1[K])+reaction.T*(reaction.aLo2_QH+0.5*reaction.T*(reaction.aLo3_QH+2*reaction.T*(reaction.aLo4_QH+0.75*reaction.T*reaction.aLo5_QH)/3)))+(reaction.T>reaction.Tmid_QH)*(reaction.T<=reaction.Thi_QH)*(reaction.aHi7_QH+reaction.aHi1_QH*log(reaction.T/1[K])+reaction.T*(reaction.aHi2_QH+0.5*reaction.T*(reaction.aHi3_QH+2*reaction.T*(reaction.aHi4_QH+0.75*reaction.T*reaction.aHi5_QH)/3)))+(reaction.T>reaction.Thi_QH)*(reaction.aHi7_QH+reaction.aHi1_QH*log(reaction.T/1[K])+reaction.Thi_QH*(reaction.aHi2_QH+0.5*reaction.Thi_QH*(reaction.aHi3_QH+2*reaction.Thi_QH*(reaction.aHi4_QH+0.75*reaction.Thi_QH*reaction.aHi5_QH)/3))))
      Cp = R_const*((reaction.T<=reaction.Tlo_QH)*(reaction.aLo1_QH+reaction.Tlo_QH*(reaction.aLo2_QH+reaction.Tlo_QH*(reaction.aLo3_QH+reaction.Tlo_QH*(reaction.aLo4_QH+reaction.Tlo_QH*reaction.aLo5_QH))))+(reaction.T>reaction.Tlo_QH)*(reaction.T<=reaction.Tmid_QH)*(reaction.aLo1_QH+reaction.T*(reaction.aLo2_QH+reaction.T*(reaction.aLo3_QH+reaction.T*(reaction.aLo4_QH+reaction.T*reaction.aLo5_QH))))+(reaction.T>reaction.Tmid_QH)*(reaction.T<=reaction.Thi_QH)*(reaction.aHi1_QH+reaction.T*(reaction.aHi2_QH+reaction.T*(reaction.aHi3_QH+reaction.T*(reaction.aHi4_QH+reaction.T*reaction.aHi5_QH))))+(reaction.T>reaction.Thi_QH)*(reaction.aHi1_QH+reaction.Thi_QH*(reaction.aHi2_QH+reaction.Thi_QH*(reaction.aHi3_QH+reaction.Thi_QH*(reaction.aHi4_QH+reaction.Thi_QH*reaction.aHi5_QH)))))
      sigma = 3.458[angstrom]
      epsilonkb = 107.4[K]
      mu = 0[C*m]
      ActivityCoefficient = 1
      speciesEnthalpy = NASA
      ReactionTagInSpecies = {rch2, rch3, rch5, rch7}
      updatefeat = 1
      GasThermalConductivitySel = Automatic
      GasDiffusivitySel = Automatic
      LiquidDiffusivitySel = Automatic
      k = 0.02[W/(m*K)]
      De = 1e-5[m^2/s]
      SpeciesrateSelection = Automatic
      specName = QH
      R = reaction.r_2-reaction.r_3+2*reaction.r_5+reaction.r_7
      Speciesrate = 0[mol/(m^3*s)]
      SpeciesrateSurf = 0[mol/(m^2*s)]
      Speciessurfacerate = 0[mol/(m^2*s)]
      typeGUIControl = volumetric
      mixtureSolvent = 1
      Dgas = 10^-5[m^2/s]
      Dliquid = 10^-8[m^2/s]
      kgas = 0.015[W/(m*K)]
      MolarMassSelection = Thermodynamics
      M = 0.0[kg/mol]
      liquidDensitySel = Thermodynamics
      rho = 1000[kg/m^3]
      LiquidThermalConductivitySel = Thermodynamics
    D: SpeciesChem "Species: D"
      sisDef = 1
      sType = volumetric
      sSequenceNo = 9
      SpeciesSource = Reaction
      specLabel = D
      Tlo = 300[K]
      Tmid = 1000[K]
      Thi = 5000[K]
      h = R_const*((reaction.T<=reaction.Tlo_D)*(reaction.aLo6_D+reaction.Tlo_D*(reaction.aLo1_D+0.5*reaction.Tlo_D*(reaction.aLo2_D+2*reaction.Tlo_D*(reaction.aLo3_D+0.75*reaction.Tlo_D*(reaction.aLo4_D+0.8*reaction.Tlo_D*reaction.aLo5_D))/3)))+(reaction.T>reaction.Tlo_D)*(reaction.T<=reaction.Tmid_D)*(reaction.aLo6_D+reaction.T*(reaction.aLo1_D+0.5*reaction.T*(reaction.aLo2_D+2*reaction.T*(reaction.aLo3_D+0.75*reaction.T*(reaction.aLo4_D+0.8*reaction.T*reaction.aLo5_D))/3)))+(reaction.T>reaction.Tmid_D)*(reaction.T<=reaction.Thi_D)*(reaction.aHi6_D+reaction.T*(reaction.aHi1_D+0.5*reaction.T*(reaction.aHi2_D+2*reaction.T*(reaction.aHi3_D+0.75*reaction.T*(reaction.aHi4_D+0.8*reaction.T*reaction.aHi5_D))/3)))+(reaction.T>reaction.Thi_D)*(reaction.aHi6_D+reaction.Thi_D*(reaction.aHi1_D+0.5*reaction.Thi_D*(reaction.aHi2_D+2*reaction.Thi_D*(reaction.aHi3_D+0.75*reaction.Thi_D*(reaction.aHi4_D+0.8*reaction.Thi_D*reaction.aHi5_D))/3))))
      s = R_const*((reaction.T<=reaction.Tlo_D)*(reaction.aLo7_D+reaction.aLo1_D*log(reaction.T/1[K])+reaction.Tlo_D*(reaction.aLo2_D+0.5*reaction.Tlo_D*(reaction.aLo3_D+2*reaction.Tlo_D*(reaction.aLo4_D+0.75*reaction.Tlo_D*reaction.aLo5_D)/3)))+(reaction.T>reaction.Tlo_D)*(reaction.T<=reaction.Tmid_D)*(reaction.aLo7_D+reaction.aLo1_D*log(reaction.T/1[K])+reaction.T*(reaction.aLo2_D+0.5*reaction.T*(reaction.aLo3_D+2*reaction.T*(reaction.aLo4_D+0.75*reaction.T*reaction.aLo5_D)/3)))+(reaction.T>reaction.Tmid_D)*(reaction.T<=reaction.Thi_D)*(reaction.aHi7_D+reaction.aHi1_D*log(reaction.T/1[K])+reaction.T*(reaction.aHi2_D+0.5*reaction.T*(reaction.aHi3_D+2*reaction.T*(reaction.aHi4_D+0.75*reaction.T*reaction.aHi5_D)/3)))+(reaction.T>reaction.Thi_D)*(reaction.aHi7_D+reaction.aHi1_D*log(reaction.T/1[K])+reaction.Thi_D*(reaction.aHi2_D+0.5*reaction.Thi_D*(reaction.aHi3_D+2*reaction.Thi_D*(reaction.aHi4_D+0.75*reaction.Thi_D*reaction.aHi5_D)/3))))
      Cp = R_const*((reaction.T<=reaction.Tlo_D)*(reaction.aLo1_D+reaction.Tlo_D*(reaction.aLo2_D+reaction.Tlo_D*(reaction.aLo3_D+reaction.Tlo_D*(reaction.aLo4_D+reaction.Tlo_D*reaction.aLo5_D))))+(reaction.T>reaction.Tlo_D)*(reaction.T<=reaction.Tmid_D)*(reaction.aLo1_D+reaction.T*(reaction.aLo2_D+reaction.T*(reaction.aLo3_D+reaction.T*(reaction.aLo4_D+reaction.T*reaction.aLo5_D))))+(reaction.T>reaction.Tmid_D)*(reaction.T<=reaction.Thi_D)*(reaction.aHi1_D+reaction.T*(reaction.aHi2_D+reaction.T*(reaction.aHi3_D+reaction.T*(reaction.aHi4_D+reaction.T*reaction.aHi5_D))))+(reaction.T>reaction.Thi_D)*(reaction.aHi1_D+reaction.Thi_D*(reaction.aHi2_D+reaction.Thi_D*(reaction.aHi3_D+reaction.Thi_D*(reaction.aHi4_D+reaction.Thi_D*reaction.aHi5_D)))))
      sigma = 3.458[angstrom]
      epsilonkb = 107.4[K]
      mu = 0[C*m]
      ActivityCoefficient = 1
      speciesEnthalpy = NASA
      ReactionTagInSpecies = {rch2, rch3, rch8, rch9}
      updatefeat = 1
      GasThermalConductivitySel = Automatic
      GasDiffusivitySel = Automatic
      LiquidDiffusivitySel = Automatic
      k = 0.02[W/(m*K)]
      De = 1e-5[m^2/s]
      SpeciesrateSelection = Automatic
      specName = D
      R = reaction.r_2-reaction.r_3+reaction.r_8-2*reaction.r_9
      Speciesrate = 0[mol/(m^3*s)]
      SpeciesrateSurf = 0[mol/(m^2*s)]
      Speciessurfacerate = 0[mol/(m^2*s)]
      typeGUIControl = volumetric
      mixtureSolvent = 1
      Dgas = 10^-5[m^2/s]
      Dliquid = 10^-8[m^2/s]
      kgas = 0.015[W/(m*K)]
      MolarMassSelection = Thermodynamics
      M = 0.0[kg/mol]
      liquidDensitySel = Thermodynamics
      rho = 1000[kg/m^3]
      LiquidThermalConductivitySel = Thermodynamics
    QHD: SpeciesChem "Species: QHD"
      sisDef = 1
      sType = volumetric
      sSequenceNo = 10
      SpeciesSource = Reaction
      specLabel = QHD
      Tlo = 300[K]
      Tmid = 1000[K]
      Thi = 5000[K]
      h = R_const*((reaction.T<=reaction.Tlo_QHD)*(reaction.aLo6_QHD+reaction.Tlo_QHD*(reaction.aLo1_QHD+0.5*reaction.Tlo_QHD*(reaction.aLo2_QHD+2*reaction.Tlo_QHD*(reaction.aLo3_QHD+0.75*reaction.Tlo_QHD*(reaction.aLo4_QHD+0.8*reaction.Tlo_QHD*reaction.aLo5_QHD))/3)))+(reaction.T>reaction.Tlo_QHD)*(reaction.T<=reaction.Tmid_QHD)*(reaction.aLo6_QHD+reaction.T*(reaction.aLo1_QHD+0.5*reaction.T*(reaction.aLo2_QHD+2*reaction.T*(reaction.aLo3_QHD+0.75*reaction.T*(reaction.aLo4_QHD+0.8*reaction.T*reaction.aLo5_QHD))/3)))+(reaction.T>reaction.Tmid_QHD)*(reaction.T<=reaction.Thi_QHD)*(reaction.aHi6_QHD+reaction.T*(reaction.aHi1_QHD+0.5*reaction.T*(reaction.aHi2_QHD+2*reaction.T*(reaction.aHi3_QHD+0.75*reaction.T*(reaction.aHi4_QHD+0.8*reaction.T*reaction.aHi5_QHD))/3)))+(reaction.T>reaction.Thi_QHD)*(reaction.aHi6_QHD+reaction.Thi_QHD*(reaction.aHi1_QHD+0.5*reaction.Thi_QHD*(reaction.aHi2_QHD+2*reaction.Thi_QHD*(reaction.aHi3_QHD+0.75*reaction.Thi_QHD*(reaction.aHi4_QHD+0.8*reaction.Thi_QHD*reaction.aHi5_QHD))/3))))
      s = R_const*((reaction.T<=reaction.Tlo_QHD)*(reaction.aLo7_QHD+reaction.aLo1_QHD*log(reaction.T/1[K])+reaction.Tlo_QHD*(reaction.aLo2_QHD+0.5*reaction.Tlo_QHD*(reaction.aLo3_QHD+2*reaction.Tlo_QHD*(reaction.aLo4_QHD+0.75*reaction.Tlo_QHD*reaction.aLo5_QHD)/3)))+(reaction.T>reaction.Tlo_QHD)*(reaction.T<=reaction.Tmid_QHD)*(reaction.aLo7_QHD+reaction.aLo1_QHD*log(reaction.T/1[K])+reaction.T*(reaction.aLo2_QHD+0.5*reaction.T*(reaction.aLo3_QHD+2*reaction.T*(reaction.aLo4_QHD+0.75*reaction.T*reaction.aLo5_QHD)/3)))+(reaction.T>reaction.Tmid_QHD)*(reaction.T<=reaction.Thi_QHD)*(reaction.aHi7_QHD+reaction.aHi1_QHD*log(reaction.T/1[K])+reaction.T*(reaction.aHi2_QHD+0.5*reaction.T*(reaction.aHi3_QHD+2*reaction.T*(reaction.aHi4_QHD+0.75*reaction.T*reaction.aHi5_QHD)/3)))+(reaction.T>reaction.Thi_QHD)*(reaction.aHi7_QHD+reaction.aHi1_QHD*log(reaction.T/1[K])+reaction.Thi_QHD*(reaction.aHi2_QHD+0.5*reaction.Thi_QHD*(reaction.aHi3_QHD+2*reaction.Thi_QHD*(reaction.aHi4_QHD+0.75*reaction.Thi_QHD*reaction.aHi5_QHD)/3))))
      Cp = R_const*((reaction.T<=reaction.Tlo_QHD)*(reaction.aLo1_QHD+reaction.Tlo_QHD*(reaction.aLo2_QHD+reaction.Tlo_QHD*(reaction.aLo3_QHD+reaction.Tlo_QHD*(reaction.aLo4_QHD+reaction.Tlo_QHD*reaction.aLo5_QHD))))+(reaction.T>reaction.Tlo_QHD)*(reaction.T<=reaction.Tmid_QHD)*(reaction.aLo1_QHD+reaction.T*(reaction.aLo2_QHD+reaction.T*(reaction.aLo3_QHD+reaction.T*(reaction.aLo4_QHD+reaction.T*reaction.aLo5_QHD))))+(reaction.T>reaction.Tmid_QHD)*(reaction.T<=reaction.Thi_QHD)*(reaction.aHi1_QHD+reaction.T*(reaction.aHi2_QHD+reaction.T*(reaction.aHi3_QHD+reaction.T*(reaction.aHi4_QHD+reaction.T*reaction.aHi5_QHD))))+(reaction.T>reaction.Thi_QHD)*(reaction.aHi1_QHD+reaction.Thi_QHD*(reaction.aHi2_QHD+reaction.Thi_QHD*(reaction.aHi3_QHD+reaction.Thi_QHD*(reaction.aHi4_QHD+reaction.Thi_QHD*reaction.aHi5_QHD)))))
      sigma = 3.458[angstrom]
      epsilonkb = 107.4[K]
      mu = 0[C*m]
      ActivityCoefficient = 1
      speciesEnthalpy = NASA
      ReactionTagInSpecies = {rch3, rch4, rch7}
      updatefeat = 1
      GasThermalConductivitySel = Automatic
      GasDiffusivitySel = Automatic
      LiquidDiffusivitySel = Automatic
      k = 0.02[W/(m*K)]
      De = 1e-5[m^2/s]
      SpeciesrateSelection = Automatic
      specName = QHD
      R = reaction.r_3-reaction.r_4-reaction.r_7
      Speciesrate = 0[mol/(m^3*s)]
      SpeciesrateSurf = 0[mol/(m^2*s)]
      Speciessurfacerate = 0[mol/(m^2*s)]
      typeGUIControl = volumetric
      mixtureSolvent = 1
      Dgas = 10^-5[m^2/s]
      Dliquid = 10^-8[m^2/s]
      kgas = 0.015[W/(m*K)]
      MolarMassSelection = Thermodynamics
      M = 0.0[kg/mol]
      liquidDensitySel = Thermodynamics
      rho = 1000[kg/m^3]
      LiquidThermalConductivitySel = Thermodynamics
    QHH: SpeciesChem "Species: QHH"
      sisDef = 1
      sType = volumetric
      sSequenceNo = 11
      SpeciesSource = Reaction
      specLabel = QHH
      Tlo = 300[K]
      Tmid = 1000[K]
      Thi = 5000[K]
      h = R_const*((reaction.T<=reaction.Tlo_QHH)*(reaction.aLo6_QHH+reaction.Tlo_QHH*(reaction.aLo1_QHH+0.5*reaction.Tlo_QHH*(reaction.aLo2_QHH+2*reaction.Tlo_QHH*(reaction.aLo3_QHH+0.75*reaction.Tlo_QHH*(reaction.aLo4_QHH+0.8*reaction.Tlo_QHH*reaction.aLo5_QHH))/3)))+(reaction.T>reaction.Tlo_QHH)*(reaction.T<=reaction.Tmid_QHH)*(reaction.aLo6_QHH+reaction.T*(reaction.aLo1_QHH+0.5*reaction.T*(reaction.aLo2_QHH+2*reaction.T*(reaction.aLo3_QHH+0.75*reaction.T*(reaction.aLo4_QHH+0.8*reaction.T*reaction.aLo5_QHH))/3)))+(reaction.T>reaction.Tmid_QHH)*(reaction.T<=reaction.Thi_QHH)*(reaction.aHi6_QHH+reaction.T*(reaction.aHi1_QHH+0.5*reaction.T*(reaction.aHi2_QHH+2*reaction.T*(reaction.aHi3_QHH+0.75*reaction.T*(reaction.aHi4_QHH+0.8*reaction.T*reaction.aHi5_QHH))/3)))+(reaction.T>reaction.Thi_QHH)*(reaction.aHi6_QHH+reaction.Thi_QHH*(reaction.aHi1_QHH+0.5*reaction.Thi_QHH*(reaction.aHi2_QHH+2*reaction.Thi_QHH*(reaction.aHi3_QHH+0.75*reaction.Thi_QHH*(reaction.aHi4_QHH+0.8*reaction.Thi_QHH*reaction.aHi5_QHH))/3))))
      s = R_const*((reaction.T<=reaction.Tlo_QHH)*(reaction.aLo7_QHH+reaction.aLo1_QHH*log(reaction.T/1[K])+reaction.Tlo_QHH*(reaction.aLo2_QHH+0.5*reaction.Tlo_QHH*(reaction.aLo3_QHH+2*reaction.Tlo_QHH*(reaction.aLo4_QHH+0.75*reaction.Tlo_QHH*reaction.aLo5_QHH)/3)))+(reaction.T>reaction.Tlo_QHH)*(reaction.T<=reaction.Tmid_QHH)*(reaction.aLo7_QHH+reaction.aLo1_QHH*log(reaction.T/1[K])+reaction.T*(reaction.aLo2_QHH+0.5*reaction.T*(reaction.aLo3_QHH+2*reaction.T*(reaction.aLo4_QHH+0.75*reaction.T*reaction.aLo5_QHH)/3)))+(reaction.T>reaction.Tmid_QHH)*(reaction.T<=reaction.Thi_QHH)*(reaction.aHi7_QHH+reaction.aHi1_QHH*log(reaction.T/1[K])+reaction.T*(reaction.aHi2_QHH+0.5*reaction.T*(reaction.aHi3_QHH+2*reaction.T*(reaction.aHi4_QHH+0.75*reaction.T*reaction.aHi5_QHH)/3)))+(reaction.T>reaction.Thi_QHH)*(reaction.aHi7_QHH+reaction.aHi1_QHH*log(reaction.T/1[K])+reaction.Thi_QHH*(reaction.aHi2_QHH+0.5*reaction.Thi_QHH*(reaction.aHi3_QHH+2*reaction.Thi_QHH*(reaction.aHi4_QHH+0.75*reaction.Thi_QHH*reaction.aHi5_QHH)/3))))
      Cp = R_const*((reaction.T<=reaction.Tlo_QHH)*(reaction.aLo1_QHH+reaction.Tlo_QHH*(reaction.aLo2_QHH+reaction.Tlo_QHH*(reaction.aLo3_QHH+reaction.Tlo_QHH*(reaction.aLo4_QHH+reaction.Tlo_QHH*reaction.aLo5_QHH))))+(reaction.T>reaction.Tlo_QHH)*(reaction.T<=reaction.Tmid_QHH)*(reaction.aLo1_QHH+reaction.T*(reaction.aLo2_QHH+reaction.T*(reaction.aLo3_QHH+reaction.T*(reaction.aLo4_QHH+reaction.T*reaction.aLo5_QHH))))+(reaction.T>reaction.Tmid_QHH)*(reaction.T<=reaction.Thi_QHH)*(reaction.aHi1_QHH+reaction.T*(reaction.aHi2_QHH+reaction.T*(reaction.aHi3_QHH+reaction.T*(reaction.aHi4_QHH+reaction.T*reaction.aHi5_QHH))))+(reaction.T>reaction.Thi_QHH)*(reaction.aHi1_QHH+reaction.Thi_QHH*(reaction.aHi2_QHH+reaction.Thi_QHH*(reaction.aHi3_QHH+reaction.Thi_QHH*(reaction.aHi4_QHH+reaction.Thi_QHH*reaction.aHi5_QHH)))))
      sigma = 3.458[angstrom]
      epsilonkb = 107.4[K]
      mu = 0[C*m]
      ActivityCoefficient = 1
      speciesEnthalpy = NASA
      ReactionTagInSpecies = {rch4, rch5}
      updatefeat = 1
      GasThermalConductivitySel = Automatic
      GasDiffusivitySel = Automatic
      LiquidDiffusivitySel = Automatic
      k = 0.02[W/(m*K)]
      De = 1e-5[m^2/s]
      SpeciesrateSelection = Automatic
      specName = QHH
      R = reaction.r_4-reaction.r_5
      Speciesrate = 0[mol/(m^3*s)]
      SpeciesrateSurf = 0[mol/(m^2*s)]
      Speciessurfacerate = 0[mol/(m^2*s)]
      typeGUIControl = volumetric
      mixtureSolvent = 1
      Dgas = 10^-5[m^2/s]
      Dliquid = 10^-8[m^2/s]
      kgas = 0.015[W/(m*K)]
      MolarMassSelection = Thermodynamics
      M = 0.0[kg/mol]
      liquidDensitySel = Thermodynamics
      rho = 1000[kg/m^3]
      LiquidThermalConductivitySel = Thermodynamics
    prod: SpeciesChem "Species: prod"
      sisDef = 1
      sType = volumetric
      sSequenceNo = 12
      SpeciesSource = Reaction
      specLabel = prod
      Tlo = 300[K]
      Tmid = 1000[K]
      Thi = 5000[K]
      h = R_const*((reaction.T<=reaction.Tlo_prod)*(reaction.aLo6_prod+reaction.Tlo_prod*(reaction.aLo1_prod+0.5*reaction.Tlo_prod*(reaction.aLo2_prod+2*reaction.Tlo_prod*(reaction.aLo3_prod+0.75*reaction.Tlo_prod*(reaction.aLo4_prod+0.8*reaction.Tlo_prod*reaction.aLo5_prod))/3)))+(reaction.T>reaction.Tlo_prod)*(reaction.T<=reaction.Tmid_prod)*(reaction.aLo6_prod+reaction.T*(reaction.aLo1_prod+0.5*reaction.T*(reaction.aLo2_prod+2*reaction.T*(reaction.aLo3_prod+0.75*reaction.T*(reaction.aLo4_prod+0.8*reaction.T*reaction.aLo5_prod))/3)))+(reaction.T>reaction.Tmid_prod)*(reaction.T<=reaction.Thi_prod)*(reaction.aHi6_prod+reaction.T*(reaction.aHi1_prod+0.5*reaction.T*(reaction.aHi2_prod+2*reaction.T*(reaction.aHi3_prod+0.75*reaction.T*(reaction.aHi4_prod+0.8*reaction.T*reaction.aHi5_prod))/3)))+(reaction.T>reaction.Thi_prod)*(reaction.aHi6_prod+reaction.Thi_prod*(reaction.aHi1_prod+0.5*reaction.Thi_prod*(reaction.aHi2_prod+2*reaction.Thi_prod*(reaction.aHi3_prod+0.75*reaction.Thi_prod*(reaction.aHi4_prod+0.8*reaction.Thi_prod*reaction.aHi5_prod))/3))))
      s = R_const*((reaction.T<=reaction.Tlo_prod)*(reaction.aLo7_prod+reaction.aLo1_prod*log(reaction.T/1[K])+reaction.Tlo_prod*(reaction.aLo2_prod+0.5*reaction.Tlo_prod*(reaction.aLo3_prod+2*reaction.Tlo_prod*(reaction.aLo4_prod+0.75*reaction.Tlo_prod*reaction.aLo5_prod)/3)))+(reaction.T>reaction.Tlo_prod)*(reaction.T<=reaction.Tmid_prod)*(reaction.aLo7_prod+reaction.aLo1_prod*log(reaction.T/1[K])+reaction.T*(reaction.aLo2_prod+0.5*reaction.T*(reaction.aLo3_prod+2*reaction.T*(reaction.aLo4_prod+0.75*reaction.T*reaction.aLo5_prod)/3)))+(reaction.T>reaction.Tmid_prod)*(reaction.T<=reaction.Thi_prod)*(reaction.aHi7_prod+reaction.aHi1_prod*log(reaction.T/1[K])+reaction.T*(reaction.aHi2_prod+0.5*reaction.T*(reaction.aHi3_prod+2*reaction.T*(reaction.aHi4_prod+0.75*reaction.T*reaction.aHi5_prod)/3)))+(reaction.T>reaction.Thi_prod)*(reaction.aHi7_prod+reaction.aHi1_prod*log(reaction.T/1[K])+reaction.Thi_prod*(reaction.aHi2_prod+0.5*reaction.Thi_prod*(reaction.aHi3_prod+2*reaction.Thi_prod*(reaction.aHi4_prod+0.75*reaction.Thi_prod*reaction.aHi5_prod)/3))))
      Cp = R_const*((reaction.T<=reaction.Tlo_prod)*(reaction.aLo1_prod+reaction.Tlo_prod*(reaction.aLo2_prod+reaction.Tlo_prod*(reaction.aLo3_prod+reaction.Tlo_prod*(reaction.aLo4_prod+reaction.Tlo_prod*reaction.aLo5_prod))))+(reaction.T>reaction.Tlo_prod)*(reaction.T<=reaction.Tmid_prod)*(reaction.aLo1_prod+reaction.T*(reaction.aLo2_prod+reaction.T*(reaction.aLo3_prod+reaction.T*(reaction.aLo4_prod+reaction.T*reaction.aLo5_prod))))+(reaction.T>reaction.Tmid_prod)*(reaction.T<=reaction.Thi_prod)*(reaction.aHi1_prod+reaction.T*(reaction.aHi2_prod+reaction.T*(reaction.aHi3_prod+reaction.T*(reaction.aHi4_prod+reaction.T*reaction.aHi5_prod))))+(reaction.T>reaction.Thi_prod)*(reaction.aHi1_prod+reaction.Thi_prod*(reaction.aHi2_prod+reaction.Thi_prod*(reaction.aHi3_prod+reaction.Thi_prod*(reaction.aHi4_prod+reaction.Thi_prod*reaction.aHi5_prod)))))
      sigma = 3.458[angstrom]
      epsilonkb = 107.4[K]
      mu = 0[C*m]
      ActivityCoefficient = 1
      speciesEnthalpy = NASA
      ReactionTagInSpecies = {rch4, rch6, rch9}
      updatefeat = 1
      GasThermalConductivitySel = Automatic
      GasDiffusivitySel = Automatic
      LiquidDiffusivitySel = Automatic
      k = 0.02[W/(m*K)]
      De = 1e-5[m^2/s]
      SpeciesrateSelection = Automatic
      specName = prod
      R = reaction.r_4+reaction.r_6+reaction.r_9
      Speciesrate = 0[mol/(m^3*s)]
      SpeciesrateSurf = 0[mol/(m^2*s)]
      Speciessurfacerate = 0[mol/(m^2*s)]
      typeGUIControl = volumetric
      mixtureSolvent = 1
      Dgas = 10^-5[m^2/s]
      Dliquid = 10^-8[m^2/s]
      kgas = 0.015[W/(m*K)]
      MolarMassSelection = Thermodynamics
      M = 0.0[kg/mol]
      liquidDensitySel = Thermodynamics
      rho = 1000[kg/m^3]
      LiquidThermalConductivitySel = Thermodynamics
    QD: SpeciesChem "Species: QD"
      sisDef = 1
      sType = volumetric
      sSequenceNo = 13
      SpeciesSource = Reaction
      specLabel = QD
      Tlo = 300[K]
      Tmid = 1000[K]
      Thi = 5000[K]
      h = R_const*((reaction.T<=reaction.Tlo_QD)*(reaction.aLo6_QD+reaction.Tlo_QD*(reaction.aLo1_QD+0.5*reaction.Tlo_QD*(reaction.aLo2_QD+2*reaction.Tlo_QD*(reaction.aLo3_QD+0.75*reaction.Tlo_QD*(reaction.aLo4_QD+0.8*reaction.Tlo_QD*reaction.aLo5_QD))/3)))+(reaction.T>reaction.Tlo_QD)*(reaction.T<=reaction.Tmid_QD)*(reaction.aLo6_QD+reaction.T*(reaction.aLo1_QD+0.5*reaction.T*(reaction.aLo2_QD+2*reaction.T*(reaction.aLo3_QD+0.75*reaction.T*(reaction.aLo4_QD+0.8*reaction.T*reaction.aLo5_QD))/3)))+(reaction.T>reaction.Tmid_QD)*(reaction.T<=reaction.Thi_QD)*(reaction.aHi6_QD+reaction.T*(reaction.aHi1_QD+0.5*reaction.T*(reaction.aHi2_QD+2*reaction.T*(reaction.aHi3_QD+0.75*reaction.T*(reaction.aHi4_QD+0.8*reaction.T*reaction.aHi5_QD))/3)))+(reaction.T>reaction.Thi_QD)*(reaction.aHi6_QD+reaction.Thi_QD*(reaction.aHi1_QD+0.5*reaction.Thi_QD*(reaction.aHi2_QD+2*reaction.Thi_QD*(reaction.aHi3_QD+0.75*reaction.Thi_QD*(reaction.aHi4_QD+0.8*reaction.Thi_QD*reaction.aHi5_QD))/3))))
      s = R_const*((reaction.T<=reaction.Tlo_QD)*(reaction.aLo7_QD+reaction.aLo1_QD*log(reaction.T/1[K])+reaction.Tlo_QD*(reaction.aLo2_QD+0.5*reaction.Tlo_QD*(reaction.aLo3_QD+2*reaction.Tlo_QD*(reaction.aLo4_QD+0.75*reaction.Tlo_QD*reaction.aLo5_QD)/3)))+(reaction.T>reaction.Tlo_QD)*(reaction.T<=reaction.Tmid_QD)*(reaction.aLo7_QD+reaction.aLo1_QD*log(reaction.T/1[K])+reaction.T*(reaction.aLo2_QD+0.5*reaction.T*(reaction.aLo3_QD+2*reaction.T*(reaction.aLo4_QD+0.75*reaction.T*reaction.aLo5_QD)/3)))+(reaction.T>reaction.Tmid_QD)*(reaction.T<=reaction.Thi_QD)*(reaction.aHi7_QD+reaction.aHi1_QD*log(reaction.T/1[K])+reaction.T*(reaction.aHi2_QD+0.5*reaction.T*(reaction.aHi3_QD+2*reaction.T*(reaction.aHi4_QD+0.75*reaction.T*reaction.aHi5_QD)/3)))+(reaction.T>reaction.Thi_QD)*(reaction.aHi7_QD+reaction.aHi1_QD*log(reaction.T/1[K])+reaction.Thi_QD*(reaction.aHi2_QD+0.5*reaction.Thi_QD*(reaction.aHi3_QD+2*reaction.Thi_QD*(reaction.aHi4_QD+0.75*reaction.Thi_QD*reaction.aHi5_QD)/3))))
      Cp = R_const*((reaction.T<=reaction.Tlo_QD)*(reaction.aLo1_QD+reaction.Tlo_QD*(reaction.aLo2_QD+reaction.Tlo_QD*(reaction.aLo3_QD+reaction.Tlo_QD*(reaction.aLo4_QD+reaction.Tlo_QD*reaction.aLo5_QD))))+(reaction.T>reaction.Tlo_QD)*(reaction.T<=reaction.Tmid_QD)*(reaction.aLo1_QD+reaction.T*(reaction.aLo2_QD+reaction.T*(reaction.aLo3_QD+reaction.T*(reaction.aLo4_QD+reaction.T*reaction.aLo5_QD))))+(reaction.T>reaction.Tmid_QD)*(reaction.T<=reaction.Thi_QD)*(reaction.aHi1_QD+reaction.T*(reaction.aHi2_QD+reaction.T*(reaction.aHi3_QD+reaction.T*(reaction.aHi4_QD+reaction.T*reaction.aHi5_QD))))+(reaction.T>reaction.Thi_QD)*(reaction.aHi1_QD+reaction.Thi_QD*(reaction.aHi2_QD+reaction.Thi_QD*(reaction.aHi3_QD+reaction.Thi_QD*(reaction.aHi4_QD+reaction.Thi_QD*reaction.aHi5_QD)))))
      sigma = 3.458[angstrom]
      epsilonkb = 107.4[K]
      mu = 0[C*m]
      ActivityCoefficient = 1
      speciesEnthalpy = NASA
      ReactionTagInSpecies = {rch7, rch8}
      updatefeat = 1
      GasThermalConductivitySel = Automatic
      GasDiffusivitySel = Automatic
      LiquidDiffusivitySel = Automatic
      k = 0.02[W/(m*K)]
      De = 1e-5[m^2/s]
      SpeciesrateSelection = Automatic
      specName = QD
      R = reaction.r_7-reaction.r_8
      Speciesrate = 0[mol/(m^3*s)]
      SpeciesrateSurf = 0[mol/(m^2*s)]
      Speciessurfacerate = 0[mol/(m^2*s)]
      typeGUIControl = volumetric
      mixtureSolvent = 1
      Dgas = 10^-5[m^2/s]
      Dliquid = 10^-8[m^2/s]
      kgas = 0.015[W/(m*K)]
      MolarMassSelection = Thermodynamics
      M = 0.0[kg/mol]
      liquidDensitySel = Thermodynamics
      rho = 1000[kg/m^3]
      LiquidThermalConductivitySel = Thermodynamics
    rch1: ReactionChem "Ke: Q + DH => Qm + DHp" | formula = Q+DH=>Qm+DHp; kf = Ke*light
    rch2: ReactionChem "KH: Qm + DHp => QH + D" | formula = Qm+DHp=>QH+D; kf = KH
    rch3: ReactionChem "Kr: QH + D => QHD" | formula = QH+D=>QHD; kf = Kr
    rch4: ReactionChem "Kp: QHD =>QHH + prod" | formula = QHD=>QHH+prod; kf = Kp
    rch5: ReactionChem "KqH/Kdisp: Q + QHH <=> 2 QH" | formula = Q+QHH<=>2QH; kf = KqH; kr = Kdisp
    rch6: ReactionChem "Kph: Q => prod" | formula = Q=>prod; kf = Kph
    rch7: ReactionChem "Ks: Q + QHD =>QH + QD" | formula = Q+QHD=>QH+QD; kf = Ks
    rch8: ReactionChem "Kd/Kc: QD <=>Q + D" | formula = QD<=>Q+D; kf = Kd; kr = Kc
    rch9: ReactionChem "KrD: 2 D => prod" | formula = 2D=>prod; kf = KrD

Studies
  std1 "Study control"
    time: Transient "Time Dependent"
      tlist = range(0,1.0e-7,1.0e-5) range(1.0e-5,1.0e-5,2.0e-4)
      useparam = on
      pname = light
      plistarr = range(0,1.0e-5,2.0e-5)

Solver configurations
  sol1 "Solution 1" (study std1)
    v1: Variables "Dependent Variables 1"
    t1: Time "Time-Dependent Solver 1"
      tlist = range(0,1.0e-7,1.0e-5) range(1.0e-5,1.0e-5,2.0e-4)
      tout = tstepsclosest
      rtol = 1.0E-5
      maxorder = 2
      stabcntrl = on
      masssingular = yes
      dDef: Direct | linsolver = pardiso
      tp1: TimeParametric
      fc1: FullyCoupled | linsolver = dDef; dtech = auto

Datasets
  dset1: Solution | solution = sol1

Evaluation groups
  eg1: EvaluationGroup | data = dset1
    gev1: EvalGlobal "Time integral" | expr = timeint(0, 1e-4, D)

Plots
  pg1: PlotGroup1D "Concentration stable" | data = dset1
    glob1: Global
      expr = {reaction.c_Q, reaction.c_DH, reaction.c_QHD, reaction.c_QHH, reaction.c_prod}
      descr = {Q, DH, QHD, QHH, prod}
  pg2: PlotGroup1D "Concentration radicals" | data = dset1
    glob1: Global
      expr = {reaction.c_Qm, reaction.c_DHp, reaction.c_QH, reaction.c_D, reaction.c_QD}
      descr = {Qm, DHp, QH, D, QD}