// COMSOL Multiphysics 6.0.0.318 model "Untitled.mph"
// Outline of the model tree
// Unit system: none

Functions
  step1: Step | funcname = step; location = 5; from = 1; to = 0

Variables
  var1 "Variables"
    light = step(t)
    Hin0 = 1
    DH0 = 1
    Pyr0 = 0
  var2 "Rates"
    k11 = 10
    k21 = 110
    k31 = 100
    K2 = 2
    k12 = K2*k22
    k22 = 1
    k33 = 2
    K4 = 2
    k14 = K4*k24
    k24 = 1
    k15 = 0

Physics
  ge: GlobalEquations "Global ODEs and DAEs"
    ge1: GlobalEquations
      name = {Hin, DH, Hin_m, DH_p, HinH, D, HinHD, Pyr, HinD, WTF}
      equation = {-Hint - light*k11*Hin*DH + k12*HinH^2 - k22*Hin*Pyr - k33*Hin*HinHD - k24*Hin*D + k14*HinD, -DHt - light*k11*Hin*DH, -Hin_mt + light*k11*Hin*DH - k21*Hin_m*DH_p, -DH_pt + light*k11*Hin*DH - k21*Hin_m*DH_p, -HinHt + k21*Hin_m*DH_p - k31*HinH*D - 2*k12*HinH^2 + 2*k22*Hin*Pyr + k33*Hin*HinHD, -Dt + k21*Hin_m*DH_p - k31*HinH*D + k14*HinD - k24*Hin*D, -HinHDt + k31*HinH*D - k33*Hin*HinHD - k15*HinHD, -Pyrt + k12*HinH^2 - k22*Hin*Pyr + k15*HinHD, -HinDt + k33*Hin*HinHD - k14*HinD + k24*Hin*D, -WTFt + k15*HinHD}
      initialValueU = {Hin0, DH0, 0, 0, 0, 0, 0, Pyr0, 0, 0}
      initialValueUt = {0, 0, 0, 0, 0, 0, 0, 0, 0, 0}
      description = {, , , , , , , , , }
      valueType = complex
      DependentVariableQuantity = dimensionless
      CustomDependentVariableUnit = m
      SourceTermQuantity = dimensionless
      CustomSourceTermUnit = m
  opt: GeneralOptimization
    gcvar1: GlobalControlVariables

Studies
  std1 "Study 1"
    sho: ShapeOptimization (disabled)
      optobj = timeint(0, 10, comp1.D)
      descr = Time integral
      objectivetype = maximization
    time: Transient "Time Dependent" | tlist = range(0,0.01,10)

Solver configurations
  sol1 "Solution 1" (study std1)
    v1: Variables "Dependent Variables 1"
    o1: Optimization "Optimization Solver 1"
      t1: TimeAttrib "Time-Dependent Solver 1"
        dDef: Direct
        fc1: FullyCoupled | linsolver = dDef

Datasets
  dset1: Solution | solution = sol1

Derived values
  gev1: EvalGlobal "Global Evaluation 1"
    data = dset1
    expr = {Hin, DH, Hin_m, DH_p, HinH, D, HinHD, Pyr, HinD, WTF}
    descr = {State variable Hin, State variable DH, State variable Hin_m, State variable DH_p, State variable HinH, State variable D, State variable HinHD, State variable Pyr, State variable HinD, State variable WTF}

Plots
  pg1: PlotGroup1D "Plots" | data = dset1; xlabel = Time; ylabel = Concentration
    glob3: Global "light" | expr = light; autoexpr = on
    glob1: Global "Important" | expr = {Hin, DH, D, Pyr}; descriptionintitle = off; unitintitle = off; autoexpr = on
    glob2: Global "Not important"
      expr = {Hin_m, DH_p, WTF, HinHD, HinH, HinD}
      descriptionintitle = off
      unitintitle = off
      autoexpr = on

Methods
  method1: CodeEditor
    public class method1 extends ApplicationMethod {
      public void execute() {
        model.sol("sol1").study("std1");
        with(model.study("std1").feature("time"));
          set("notlistsolnum", 1);
          set("notsolnum", "auto");
          set("listsolnum", 1);
          set("solnum", "auto");
        endwith();
        model.sol("sol1").feature().remove("t1");
        model.sol("sol1").feature().remove("v1");
        model.sol("sol1").feature().remove("st1");
        model.sol("sol1").create("st1", "StudyStep");
        with(model.sol("sol1").feature("st1"));
          set("study", "std1");
          set("studystep", "time");
        endwith();
        model.sol("sol1").create("v1", "Variables");
        with(model.sol("sol1").feature("v1"));
          set("control", "time");
        endwith();
        model.sol("sol1").create("t1", "Time");
        with(model.sol("sol1").feature("t1"));
          set("tlist", "range(0,0.01,10)");
          set("plot", "off");
          set("plotgroup", "pg1");
          set("plotfreq", "tout");
          set("probesel", "all");
          set("probes", new String[]{});
          set("probefreq", "tsteps");
          set("atolglobalvaluemethod", "factor");
          set("endtimeinterpolation", true);
          set("control", "time");
        endwith();
        model.sol("sol1").feature("t1").create("fc1", "FullyCoupled");
        with(model.sol("sol1").feature("t1").feature("fc1"));
          set("linsolver", "dDef");
        endwith();
        model.sol("sol1").feature("t1").feature().remove("fcDef");
        model.sol("sol1").attach("std1");
        model.sol("sol1").runAll();
        model.result("pg1").run();
      }
    }