// COMSOL Multiphysics 6.0.0.318 model "Component infinite bcs.mph"
// Outline of the model tree
// Unit system: none

Parameters
  g = 4  // Coefficient gamma
  a = 0.01  // General diffusion coefficient
  light_start = 0.7  // Start light position
  light_end = 0.8  // End light position
  v = -0.1  // light move velocity

Functions
  gp1: GaussianPulse | funcname = L_gp1; location = (light_end+light_start-t*v)/2; sigma = 0.05; normalization = peak
  pw1: Piecewise | funcname = L_pw1; smooth = contd2; pieces = {{light_start-0.2, light_start, 0}, {light_start, light_end, 1}, {light_end, light_end+0.2, 0}}
  pw2: Piecewise | funcname = L_pw2; pieces = {{0, 0.2, -10*abs(x-0.1)+1}, {0.2, 1, 0}}
  an2: Analytic "Light" | funcname = L; expr = L_gp1(x)*if(t<3,1,0)
  gp2: GaussianPulse | funcname = M_gp2; location = 0.1; sigma = 0.1; normalization = peak; peakvalue = 0.79
  an4: Analytic "Line" | funcname = M_line; expr = -x*0.000001+0.7
  an3: Analytic "Initial" | funcname = M0; expr = M_line(x)

Variables
  var1 "Variables" on all domains
    reac = g*cM*(-log((1-cP-cN)/(1-cN)))^((g-1)/g)

Coordinate systems
  ie1: InfiniteElement "Infinite Element Domain 1" on domains 1
    ScalingType = userDefined
    dmax = 40
    width = 100*dGeomChar
    pole = 100*dGeomChar
    function = none
  pml1: PML "Perfectly Matched Layer 1" (disabled) on domains 1 | stretchingType = userDefined

Geometry
  geom1 "Geometry" (1D, length unit m)
    i1: Interval | coord = 0, 1
    i2: Interval | coord = {-0.1, 0}
    fin: Finalize "Form Union"

Physics
  tcs: ConcentratedSpecies "Transport of Concentrated Species" on domains 1, 2
    dependent variable cN = {cN, cM, cP}
    ShapeProperty.order_massfraction = 2
    ShapeProperty.boundaryFlux_massfraction = 0
    ShapeProperty.boundaryFluxSmooth_massfraction = 0
    Ac.Ac = 0.01
    TransportMechanism.DiffusionModel = MaxwellStefan
    TransportMechanism.KnudsenDiffusion = 0
    SpeciesProperties.FromMassConstraint = 3
    cdm1: ConvectionDiffusionMigration "Transport Properties" (default)
      rho_src = userdef
      rho = 1
      M_cN = 1
      M_cM = 1
      M_cP = 1
      u_src = fromCommonDef
      Df = 
        {a, 0, 0, 0, a, 0, 0, 0, a}
        {a *exp(-cP/0.13), 0, 0, 0, a *exp(-cP/0.13), 0, 0, 0, a *exp(-cP/0.13)}
        {a *exp(-cP/0.13), 0, 0, 0, a *exp(-cP/0.13), 0, 0, 0, a *exp(-cP/0.13)}
      DiffusionTableType = table
      Dik = {1, a, a*exp(-cP/0.13), a, 1, a*exp(-cP/0.13), a*exp(-cP/0.13), a*exp(-cP/0.13), 1}
      DF = {a, a*exp(-cP/0.13), a*exp(-cP/0.13)}
      minput_pressure = 1
      minput_temperature = 1
    init1: init "Initial Values" (default)
      MixtureSpecification = MoleFractions
      w0 = {0.2, 0.79, 0.1}
      x0 = {1-M0(x)-0.01, M0(x), 0.0001}
    nflx1: NoFlux (default)
    reac1: ReactionSources on domains 1, 2
      MassTransferToOtherPhases = 0
      R_cM_src = userdef
      R_cM = -L(x)*reac
      R_cP = 4*L(x)*(-log(cM/(1-cN)))^(3/4)

Mesh
  mesh1 "Mesh"
    size: MeshSizeDefault | hmax = 0.001; hauto = 1; custom = on
    edg1: Edge on remaining entities

Studies
  std1 "Study"
    time: Transient "Time Dependent" | tlist = range(0,0.00100020004001,5)

Solver configurations
  sol1 "Solution 1" (study std1)
    v1: Variables "Dependent Variables 1" | resscalemethod = manual
    t1: Time "Time-Dependent Solver 1"
      tlist = range(0,0.00100020004001,5)
      rtol = 0.005
      tstepsbdf = intermediate
      maxorder = 2
      eventtol = 0.0001
      stabcntrl = on
      masssingular = yes
      estrat = exclude
      fc1: FullyCoupled
        linsolver = d1
        dtech = auto
        maxiter = 8
        damp = 0.9
        jtech = once
        stabacc = aacc
        aaccdim = 5
        aaccmix = 0.9
        aaccdelay = 1
      d1: Direct "Direct, mass fractions (tcs)" | linsolver = pardiso; pivotperturb = 1.0E-13

Datasets
  dset1: Solution | solution = sol1

Plots
  pg1: PlotGroup1D "Concentrations, All Species (tcs)" | data = dset1; title = Concentrations, All Species
    lngr1: LineGraph "Species cN" on all domains | expr = tcs.c_cN; xdata = expr; xdataexpr = x; autosolution = off
    lngr2: LineGraph "Species cM" on all domains | expr = tcs.c_cM; xdata = expr; xdataexpr = x; autosolution = off
    lngr3: LineGraph "Species cP" on all domains | expr = tcs.c_cP; xdata = expr; xdataexpr = x; autosolution = off
    lngr4: LineGraph "Light graph" on domains 2 | data = dset1; expr = L(x); descr = Light
    ann1: Annotation | text = Time = eval(t); latexmarkup = on

Exports
  anim1: Animation "Full system" | target = player