// COMSOL Multiphysics 6.0.0.318 model "Component2D.mph"
// Outline of the model tree
// Unit system: none

Parameters
  g = 4  // Coefficient gamma
  a = 0.01  // Global diffusuon
  lcx = 0.1  // x light center
  lcy = 0.5  // y light center
  m0x = 0.5  // x m0 pulse center
  m0y = 0.5  // y m0 pulse center
  init_m0 = 0.7

Functions
  an1: Analytic "L_circle" | funcname = L_circle; expr = exp((-(x-lcx)^2-(y-lcy)^2)/0.02); args = {x, y}
  an2: Analytic "L_square" | funcname = L_square; expr = exp((-(x-lcx)^20-(y-lcy)^20)/1E-12); args = {x, y}
  an5: Analytic "Light" | funcname = L; expr = L_circle(x, y); args = {x, y}
  an3: Analytic "Circle" | funcname = M_circle; expr = exp((-(x-m0x)^2-(y-m0y)^2)/0.02)/1.5+0.3; args = {x, y}
  an6: Analytic "Flat" | funcname = M_flat; expr = -x*0.000001-y*0.000001+init_m0; args = {x, y}
  an4: Analytic "Initial M" | funcname = M0; expr = M_flat(x,y); args = {x, y}

Variables
  var1 "Variables"
    reac = g*cM*(-log(cM/(1-cN)))^((g-1)/g)

Geometry
  geom2 "Geometry" (2D, length unit m)
    sq1: Square
    fin: Finalize "Form Union"

Physics
  tcs: ConcentratedSpecies "Transport of Concentrated Species" on all domains
    dependent variable cN = {cN, cM, cP}
    dz.dz = 1
    TransportMechanism.DiffusionModel = MaxwellStefan
    SpeciesProperties.FromMassConstraint = 3
    cdm1: ConvectionDiffusionMigration "Transport Properties" (default)
      rho_src = userdef
      rho = 1
      u_src = fromCommonDef
      DiffusionTableType = matrix
      DF = {a, a*exp(-cP/0.13), a*exp(-cP/0.13)}
      minput_pressure = 1
      minput_temperature = 1
      M_cN = 1
      M_cM = 1
      M_cP = 1
    init1: init "Initial Values" (default) | MixtureSpecification = MoleFractions; x0 = {1-M0(x,y)-0.01, M0(x,y), 0.1}
    nflx1: NoFlux (default)
    reac1: ReactionSources on domains 1 | R_cM = -L(x,y)*reac

Mesh
  mesh2 "Mesh"
    size: MeshSizeDefault | table = cfd; hmax = 0.013; hmin = 1.5E-4; hcurve = 0.25; hauto = 2
    fq1: FreeQuad on remaining entities
    ftri1: FreeTri "Free Triangular 1" (disabled) on remaining entities

Studies
  std1 "Study"
    time: Transient "Time Dependent" | tlist = range(0,0.001001001001,1)

Solver configurations
  sol1 "Solution 1" (study std1)
    v1: Variables "Dependent Variables 1"
    t1: Time "Time-Dependent Solver 1"
      tlist = range(0,0.001001001001,1)
      rtol = 0.005
      timemethod = rk
      tstepsbdf = intermediate
      maxorder = 2
      eventtol = 0.0001
      stabcntrl = on
      masssingular = yes
      estrat = exclude
      tstepsrk34 = intermediate
      fc1: FullyCoupled
        linsolver = d1
        dtech = auto
        maxiter = 8
        damp = 0.9
        jtech = once
        stabacc = aacc
        aaccdim = 5
        aaccmix = 0.9
        aaccdelay = 1
      d1: Direct "Direct, mass fractions (tcs)" | linsolver = pardiso; pivotperturb = 1.0E-13

Datasets
  dset1: Solution | solution = sol1
  an1_ds1: Grid2D | function = an1
  cln1: CutLine2D | data = dset1; genpoints = {{0, 0.5}, {1, 0.5}}

Tables
  mrkvl2: Table "Maximum and Minimum Values 1"
    // Marker
    X | Y | cN
    0.155844 | 0.493506 | 0.263666
    0 | 0.649351 | 0.299378
  mrkvl3: Table "Maximum and Minimum Values 2"
    // Marker
    X | Y | Mass fraction
    0.0909091 | 0.506494 | 0.0792931
    0.792208 | 0 | 0.699999
  mrkvl4: Table "Maximum and Minimum Values 3"
    // Marker
    X | Y | Mass fraction
    1 | 1 | 0.01
    0.103896 | 0.493506 | 0.652284

Plots
  pg9: PlotGroup2D "3D cN" | data = dset1
    surf1: Surface "cN" | expr = cN
      hght1: Height "Height Expression 1" | expr = cN
  pg7: PlotGroup2D "3D Plots" | data = dset1
    surf1: Surface "cN" | expr = cN
      hght1: Height "Height Expression 1" | expr = cN
    surf2: Surface "cM" | expr = cM
      hght1: Height "Height Expression 1" | expr = cN
    surf3: Surface "cP" | expr = cP
      hght1: Height "Height Expression 1" | expr = cN
    surf4: Surface "light" | expr = L(x,y); wireframe = on
      hght1: Height "Height Expression 1" | expr = cN
  pg2: PlotGroup2D "Plots"
    data = dset1
    prefixintitle = Plots
    typeintitle = off
    descriptionintitle = off
    unitintitle = off
    arrayshape = square
    relpadding = 0.1
    relrowpadding = 0.1
    relcolumnpadding = 0.1
    surf1: Surface "Surface cN"
      expr = cN
      prefixintitle = neutral
      typeintitle = off
      descriptionintitle = off
      unitintitle = off
      arraydim = 2
      mrkr1: Marker | anchorpoint = upperright; table = mrkvl2
    surf2: Surface "Surface cM" | expr = cM; arraydim = 2
      trn1: Translation | trans = {1.1, 0}
      mrkr1: Marker | anchorpoint = upperright; table = mrkvl3
    surf3: Surface "Surface cP" | expr = cP; arraydim = 2
      trn1: Translation | trans = {0, -1.1}
      mrkr1: Marker | anchorpoint = upperright; table = mrkvl4
    ann1: Annotation "Neutral" | text = Neutral; arraydim = 2
    ann2: Annotation "Monomer" | text = Monomer; arraydim = 2
    ann3: Annotation "Polymer" | text = Polymer; arraydim = 2
  pg8: PlotGroup1D "1D Plot" | data = cln1; xlabel = Diagonal
    lngr1: LineGraph "Plot N" | expr = cN
    lngr2: LineGraph "Plot P" | expr = cP
    lngr3: LineGraph "Plot M" | expr = cM
    lngr4: LineGraph "Plot light" | expr = L(x,y)
    ann1: Annotation | text = Time = eval(t)

Exports
  anim1: Animation "2D Plots" | target = player; maxframes = 50
  anim4: Animation "3D Full" | target = player; maxframes = 50
  anim5: Animation "1D" | target = player
  anim6: Animation "Anime N"
    movietype = avi
    avifilename = C:\Users\HOME\Downloads\N1.avi
    aviqual = 1
    maxframes = 600
    width = 1280
    height = 720