// COMSOL Multiphysics 6.0.0.318 model "SOR — копия.mph"
// Outline of the model tree
// Unit system: none

Parameters
  k1init = 10000
  k2init = 10000
  k3init = 100
  k5init = 0.0001
  k6init = 2
  k8init = 1
  k9init = 1
  k10init = 1
  k11init = 1
  K2init = 100000
  K4init = 0.05
  t_end = 2
  scaller = 2
  step_check = 5
  k1 = 10000
  k2 = 10000
  k3 = 100
  k4 = K2*k5
  k5 = 0.0001
  k6 = 2
  k7 = K4*k8
  k8 = 1
  k9 = 1
  k10 = 10
  k11 = 0.1
  K2 = 100000
  K4 = 0.05

Functions
  step1: Step | funcname = step; location = 5; from = 1; to = 0

Variables
  var1 "Variables"
    light = step(t)
    Hin0 = 1
    DH0 = 1
    Pyr0 = 0
  var3 "Rates (R)"
    R1 = k1*Hin*DH*light
    R2 = k2*Hin_m*DH_p
    R3 = k3*HinH*D
    R4 = k4*HinH*HinH
    R5 = k5*Hin*Pyr
    R6 = k6*Hin*HinHD
    R7 = k7*HinD
    R8 = k8*Hin*D
    R9 = k9*HinHD
    R10 = k10*D*D
    R11 = k11*Hin

Physics
  ge: GlobalEquations "Global ODEs and DAEs"
    ge1: GlobalEquations "Mechanism (M)"
      name = {Hin, DH, Hin_m, DH_p, HinH, D, HinHD, Pyr, HinD, WTF}
      equation = {-Hint + -R1 + R4 - R5 - R6 + R7 - R8 - R11, -DHt + -R1, -Hin_mt + R1 - R2, -DH_pt + R1 - R2, -HinHt + R2 - R3 - 2*R4 + 2*R5 + R6, -Dt + R2 - R3 + R7 - R8 - 2*R10, -HinHDt + R3 - R6 - R9, -Pyrt + R4 - R5 + R9, -HinDt + R6 - R7 + R8, -WTFt + R9 + R10 + R11}
      initialValueU = {Hin0, DH0, 0, 0, 0, 0, 0, Pyr0, 0, 0}
      initialValueUt = {0, 0, 0, 0, 0, 0, 0, 0, 0, 0}
      description = {, , , , , , , , , }
      valueType = complex
      DependentVariableQuantity = dimensionless
      CustomDependentVariableUnit = m
      SourceTermQuantity = dimensionless
      CustomSourceTermUnit = m

Studies
  std1 "Study"
    opt: Optimization
      optsolver = montecarlo
      opttol = 0.1
      nsolvemax = 20
      keepsol = last
      optobj = timeint(0, 1,comp.D)
      objectivetype = maximization
      initval = {10000*0.5, 10000*0.5}
      scale = {10, 10}
      lbound = {10000*0.5, 10000*0.5}
      ubound = {10000, 10000}
      pname = {k1, k2}
    time: Transient "Time Dependent" | tlist = range(0,(t_end-0)/100,t_end)

Solver configurations
  sol1 "Base solution" (study std1)
    v1: Variables "Dependent Variables 1"
    t1: Time "Time-Dependent Solver 1" | tlist = range(0,(t_end-0)/100,t_end)
      dDef: Direct
      fc1: FullyCoupled | linsolver = dDef
  sol2 "Parametric Solutions 1" (study std1)

Datasets
  dset1: Solution | solution = sol1
  dset2: Solution | solution = sol2

Derived values
  gev1: EvalGlobal "Time check"
    data = dset1
    table = tbl1
    expr = {Hin, DH, D, HinH, HinHD, HinD, Hin_m, DH_p, Pyr, WTF}
  gev2: EvalGlobal "Global Evaluation 2"
    data = dset2
    expr = {Hin, DH, Hin_m, DH_p, HinH, D, HinHD, Pyr, HinD, WTF}
    descr = {State variable Hin, State variable DH, State variable Hin_m, State variable DH_p, State variable HinH, State variable D, State variable HinHD, State variable Pyr, State variable HinD, State variable WTF}

Tables
  tbl1: Table
    // Time check
    Time | Hin | DH | D | HinH | HinHD | HinD | Hin_m | DH_p | Pyr | WTF
    0.0808081 | 0.0681045 | -1.68744e-08 | 0.0936037 | 0.0993879 | 0.700301 | 0.00710594 | 0.0012901 | 0.0012901 | 0.123302 | 0.123149
  tbl3: Table "Constant table"
    k1 | k2 | Objective
    5000 | 5000 | 0.0291343
    7167.12 | 5042.42 | 0.0289001
    6964.02 | 9163.64 | 0.0282827
    7351.91 | 9889.07 | 0.0285159
    9084.29 | 9240.55 | 0.0284439
    8561.05 | 9685.81 | 0.0284036
    6188.24 | 8142.64 | 0.0285679
    7119.51 | 5490.13 | 0.0286396
    7508.62 | 8458.66 | 0.0284327
    6905.27 | 8239.54 | 0.0283368
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
Plots
  pg1: PlotGroup1D "Plots" | data = dset2; xlabel = Time; ylabel = Concentration
    glob3: Global "light" | expr = light; autoexpr = on
    glob1: Global "Important" | expr = {Hin, DH, D, Pyr}; descriptionintitle = off; unitintitle = off; autoexpr = on
    glob2: Global "Not important" (disabled)
      expr = {Hin_m, DH_p, WTF, HinHD, HinH, HinD}
      descriptionintitle = off
      unitintitle = off
      autoexpr = on