// COMSOL Multiphysics 6.0.0.286 model "semibatch_polymerization.mph"
// Semibatch Polymerization
// The predefined semibatch reactor type is used to model a solution polymerization reaction. The volume of the reacting mixture decreases as polymer is formed. Simulations show that taking this effect into account can increase polymer production drastically.
// Outline of the model tree

Parameters
  Vr_init = 10[m^3]  // Initial reactor volume
  cinlet_M = density_M/Mm_M  // Inlet concentration species M
  cinlet_P = 0[mol/m^3]  // Inlet concentration species P
  cinlet_H2O = 11000[mol/m^3]  // Inlet concentration water
  cinit_H2O = density_H2O/Mm_H2O  // Initial concentration water in reactor
  Mm_M = 0.1[kg/mol]  // Molar mass species M
  Mm_P = 0.1[kg/mol]  // Molar mass species P
  Mm_H2O = 0.018[kg/mol]  // Molar mass water
  density_M = 800[kg/m^3]  // Density species M
  density_P = 1100[kg/m^3]  // Density species P
  density_H2O = 1000[kg/m^3]  // Density water
  kf_reaction = (1/600)[1/s]  // Rate constant forward reaction
  vfmax = 1[m^3/min]  // Maximum volumetric feed rate
  t_cond = 11.2[min]  // Time for shift in feed
  fill = 0  // Control parameter for filling

Functions
  step1: Step | location = t_cond

Variables
  var1 "Variables 1"
    vf_cond1 = vfmax*(1-step1(t/1[s]))  // Volumetric feed rate operating condition 1
    vf_condc = -re.vp*step1(t/1[s])  // Volumetric feed rate compensating for the volumetric production in operating condition 2
    vfs = vf_cond1+fill*vf_condc  // Volumetric feed rate
    m_mon = re.c_M*re.M_M*re.Vr  // Monomer mass

Physics
  re: ReactionEng "Reaction Engineering"
    reactor.reactor = semibatch
    mixture.mixture = liquid
    inits1: SpeciesInitialValue "Initial Values 1" | initialValue = {cinit_H2O, 0, 0}; Vr0 = Vr_init
    rch1: ReactionChem "1: M=>P" | formula = M=>P; kf = kf_reaction
    M: SpeciesChem "Species: M" | M = Mm_M; rho = density_M
    P: SpeciesChem "Species: P" | M = Mm_P; rho = density_P
    H2O: SpeciesChem "Species: H2O" | M = Mm_H2O; rho = density_H2O
    feed1: FeedStream "Feed Inlet 1" | vf = vfs; FeedSpeciesConcentration = {cinlet_H2O, cinlet_M, 0}

Studies
  std1 "Study 1"
    param: Parametric "Parametric Sweep" | pname = fill; plistarr = 0 1
    time: Transient "Time Dependent" | tlist = range(0,0.1,3000)

Solver configurations
  sol1 "Solution 1" (study std1)
    v1: Variables "Dependent Variables 1"
    t1: Time "Time-Dependent Solver 1" | tlist = range(0,0.1,3000); tout = tsteps; rtol = 1.0E-5
      dDef: Direct
      fc1: FullyCoupled | linsolver = dDef; dtech = auto
  sol2 "Parametric Solutions 1" (study std1)

Datasets
  dset1: Solution | solution = sol1
  dset2: Solution | solution = sol2

Plots
  pg1: PlotGroup1D "Concentration (re)" | data = dset1
    glob1: Global
      expr = {re.c_M, re.c_P, re.c_H2O}
      unit = {mol/m^3, mol/m^3, mol/m^3}
      descr = {Concentration, Concentration, Concentration}
      xdata = expr
      xdataexpr = t
  pg2: PlotGroup1D "Volumetric feed rate" | data = dset2
    glob1: Global
      expr = re.sumvf
      unit = m^3/s
      descr = Sum of volume flows
      title = Global: Volumetric feed rate (m<sup>3</sup>/s)
      xdata = expr
      xdataexpr = t
      legends = {Operating condition 1, Operating condition 2}
  pg3: PlotGroup1D "Reactor volume" | data = dset2
    glob1: Global
      expr = re.Vr
      unit = m^3
      descr = Reactor volume
      xdata = expr
      xdataexpr = t
      legends = {Operating condition 1, Operating condition 2}
  pg4: PlotGroup1D "Monomer mass" | data = dset2
    glob1: Global
      expr = m_mon
      unit = kg
      descr = Monomer mass
      xdata = expr
      xdataexpr = t
      legends = {Operating condition 1, Operating condition 2}