// COMSOL Multiphysics 6.0.0.318 model "kirsch_plate.mph"
// Kirsch Infinite Plate Problem
// This static benchmark computes the stress distribution in the vicinity of a small hole in an infinite plate and compares the result with the analytical solution.
// Outline of the model tree

Parameters
  pw = 10[m]  // Physical width of infinite element domain
  deltaY = 0.1[m]  // Geometric thickness of infinite element layer

Functions
  an1: Analytic "Analytic Stress" | funcname = AnaStress; expr = 1000/2*(2+(0.1/y)^2+3*(0.1/y)^4); args = y; fununit = N/m^2; argunit = m
  an2: Analytic | expr = (pw-10*deltaY)*x^2+10*deltaY*x; fununit = m; argunit = m

Variables
  var1 "Variables 1"
    ym = if(dom==2,ie1.Ym,y)  // Physical y-coordinate

Coordinate systems
  ie1: InfiniteElement "Infinite Element Domain 1" on domains 2 | stretchingType = userDefined; function = an2

Geometry
  geom1 "Geometry 1" (2D, length unit m)
    r1: Rectangle | layername = Layer 1; layer = deltaY; layerbottom = off; layertop = on; size = {1, 1+deltaY}
    c1: Circle | r = 0.1
    dif1: Difference | input = r1; input2 = c1
    fin: Finalize "Form Union"

Materials
  mat1: Common "Material 1" on all domains
    def "Basic"
      density = 7800
    Enu "Young's modulus and Poisson's ratio"
      E = 2.1e11
      nu = 0.3

Physics
  solid: SolidMechanics on domains 1
    dependent variable u = {u, v, w}
    Type2D.Type2D = PlaneStress
    d.d = 0.1
    lemm1: LinearElasticModel "Linear Elastic Material 1" (default)
    free1: Free (default)
    init1: init "Initial Values 1" (default)
    sym1: SymmetrySolid "Symmetry 1" on boundaries 1, 5
    bndl1: BoundaryLoad on boundaries 6 | FperArea = {1e3, 0, 0}
  solid2: SolidMechanics on all domains
    dependent variable u2 = {u2, v2, w2}
    Type2D.Type2D = PlaneStress
    d.d = 0.1
    lemm1: LinearElasticModel "Linear Elastic Material 1" (default)
    free1: Free (default)
    init1: init "Initial Values 1" (default)
    sym1: SymmetrySolid "Symmetry 1" on boundaries 1, 2, 5
    bndl1: BoundaryLoad on boundaries 6, 7 | FperArea = {1e3, 0, 0}

Mesh
  mesh1 "Mesh 1"
    size: MeshSizeDefault | hmax = 0.0737; hmin = 3.3E-4; hcurve = 0.3; hgrad = 1.3
    ftri1: FreeTri "Free Triangular 1" on domains 1
      size1: Size on points 1 | hmax = 0.02; custom = on
    map1: Map "Mapped 1" on remaining entities
      dis1: Distribution on boundaries 2 | numelem = 4

Studies
  std1 "Study 1"
    stat: Stationary

Solver configurations
  sol1 "Solution 1" (study std1)
    v1: Variables "Dependent Variables 1"
    s1: Stationary "Stationary Solver 1"
      dDef: Direct
      fc1: FullyCoupled | linsolver = dDef

Datasets
  dset1: Solution | solution = sol1

Derived values
  pev1: EvalPoint "Error Evaluation" on points 1, 2
    data = dset1
    table = tbl1
    expr = {(solid.sx-AnaStress(y))/AnaStress(y), (solid2.sx-AnaStress(y))/AnaStress(y)}
    unit = {1, 1}
    descr = {Error in finite plate, Error in infinite plate}

Tables
  tbl1: Table
    // Error Evaluation
    Error in finite plate (1), Point: 1 | Error in finite plate (1), Point: 2 | Error in infinite plate (1), Point: 1 | Error in infinite plate (1), Point: 2
    0.0114801 | -0.0402059 | 0.00197542 | -0.000928652

Plots
  pg1: PlotGroup2D "Stress (solid)" | data = dset1
    surf1: Surface | expr = solid.sx; descr = Stress tensor, x component
  pg2: PlotGroup2D "Boundary Loads (solid)" | data = dset1
    arwl1: ArrowLine "Boundary Load 1" | expr = {solid.bndl1.F_Ax, solid.bndl1.F_Ay}
      col: Color "Color Expression" | expr = solid.bndl1.F_A_Mag
      def: Deform "Deformation" | expr = {u, v}; descr = Displacement field
    surf1: Surface "Gray Surfaces" | expr = 1
      def: Deform "Deformation" | expr = {u, v}; descr = Displacement field
      sel1: Selection on domains 1
  pg3: PlotGroup2D "Stress (solid2)" | data = dset1
    surf1: Surface | expr = solid2.sx; descr = Stress tensor, x component
  pg4: PlotGroup2D "Boundary Loads (solid2)" | data = dset1
    arwl1: ArrowLine "Boundary Load 1" | expr = {solid2.bndl1.F_Ax, solid2.bndl1.F_Ay}
      col: Color "Color Expression" | expr = solid2.bndl1.F_A_Mag
      def: Deform "Deformation" | expr = {u2, v2}; descr = Displacement field
    surf1: Surface "Gray Surfaces" | expr = 1
      def: Deform "Deformation" | expr = {u2, v2}; descr = Displacement field
      sel1: Selection on domains 1, 2
  pg5: PlotGroup1D "Stress Profile" | data = dset1; xlabel = Physical y-coordinate (m); ylabel = Stress (N/m²)
    lngr1: LineGraph on boundaries 1, 2 | expr = AnaStress(ym); xdata = expr; xdataexpr = ym; legends = Analytical
    lngr2: LineGraph on boundaries 1
      expr = solid.sx
      descr = Stress tensor, x component
      xdata = expr
      xdataexpr = y
      legends = Finite plate
    lngr3: LineGraph on boundaries 1, 2
      expr = solid2.sx
      descr = Stress tensor, x component
      xdata = expr
      xdataexpr = ym
      legends = Infinite plate