// COMSOL Multiphysics 6.0.0.318 model "Base.mph"
// Outline of the model tree
// Unit system: none

Parameters
  a_par = 0.01  // N M dif
  b_par = 0.1  // M P dif
  e_par = 0.2  // N P dif

Functions
  gp1: GaussianPulse | location = 0.8; sigma = 0.1; normalization = peak

Variables
  var1 "dif constants"
    a = a_par
    b = b_par*exp(-p/0.13)
    e = e_par*exp(-p/0.13)

Selections
  sel1: Explicit on no boundaries

Geometry
  geom1 "Geometry" (1D, length unit m)
    i1: Interval
    pt1: Point | p = 0.1
    pt2: Point | p = 0.9
    fin: Finalize "Form Union"

Physics
  n_flux: GeneralFormPDE "N flux" on domains 2
    dependent variable n
    gfeq1: GeneralFormPDE (default) | f = 0; Ga = -a*nx + a*p*nx - e*p*nx - a*n*px + e*n*px; da = 1
    zflx1: ZeroFluxBoundary "Zero Flux 1" (default)
    init1: init "Initial Values 1" (default) | n = 0.2
  p_flux: GeneralFormPDE "P flux" on domains 2
    dependent variable p
    gfeq1: GeneralFormPDE (default) | f = 0; Ga = -b*px + b*n*px - e*n*px - b*p*nx + e*p*nx; da = 1
    zflx1: ZeroFluxBoundary "Zero Flux 1" (default)
    init1: init "Initial Values 1" (default) | p = gp1(x)
  n_bcs: CoefficientFormBoundaryPDE "N_bcs" (disabled) on boundaries 1, 4
    dependent variable n
    ShapeProperty.order = 1
    cfeq1: CoefficientFormPDE (default) | c = 1; f = 0; da = 0
    init1: init "Initial Values 1" (default) | n = 0.01
  p_bcs: CoefficientFormBoundaryPDE "P_bcs" (disabled) on boundaries 1, 4
    dependent variable p
    ShapeProperty.order = 1
    cfeq1: CoefficientFormPDE (default) | c = 1; f = 0; da = 0
    init1: init "Initial Values 1" (default) | p = gp1(x)

Mesh
  mesh1 "Mesh"
    size: MeshSizeDefault | hmax = 0.067; hgrad = 1.3
    edg1: Edge on domains 2
      size1: Size on domains 2 | hauto = 1
    edg2: Edge on domains 1, 3
      size1: Size on domains 1, 3 | hauto = 7

Studies
  std1 "Study"
    time: Transient "Time Dependent" | tlist = range(0,0.0204081632653,1)

Solver configurations
  sol1 "Solution 1" (study std1)
    v1: Variables "Dependent Variables 1"
    t1: Time "Time-Dependent Solver 1" | tlist = range(0,0.010101010101,1)
      dDef: Direct
      fc1: FullyCoupled | linsolver = dDef; dtech = hnlin

Datasets
  dset1: Solution | solution = sol1
  gp1_ds1: Grid1D

Plots
  pg3: PlotGroup1D "Base Group"
    data = dset1
    xlabel = Coordinate
    ylabel = Concentration
    manualgrid = on
    xspacing = 0.1
    yspacing = 0.1
    axiscommonexp = off
    axisprecision = 1
    lngr1: LineGraph "neutral plot" on domains 1-3 | expr = n; descr = Neutral; typeintitle = off; legends = neutral
    lngr2: LineGraph "polimer plot" on domains 1-3
      expr = p
      descr = Polymer
      typeintitle = off
      unitintitle = off
      legends = polimer

Exports
  anim1: Animation | target = player; maxframes = 30