// COMSOL Multiphysics 6.0.0.318 model "Laplace.mph"
// Outline of the model tree

Functions
  gp1: GaussianPulse | location = 0.5; sigma = 0.1; normalization = peak

Geometry
  geom1 "Geometry 1" (1D, length unit m)
    i1: Interval
    fin: Finalize "Form Union"

Physics
  c: CoefficientFormPDE on all domains
    dependent variable u
    cfeq1: CoefficientFormPDE (default) | c = 0.01; f = 0; da = 1
    zflx1: ZeroFluxBoundary "Zero Flux 1" (default)
    init1: init "Initial Values 1" (default) | u = gp1(x)

Mesh
  mesh1 "Mesh 1" (physics-controlled)
    size: MeshSizeDefault | hauto = 3

Studies
  std1 "Study 1"
    time: Transient "Time Dependent" | tlist = range(0,0.0505050505051,5)

Solver configurations
  sol1 "Solution 1" (study std1)
    v1: Variables "Dependent Variables 1"
    t1: Time "Time-Dependent Solver 1" | tlist = range(0,0.0505050505051,5)
      dDef: Direct
      fc1: FullyCoupled | linsolver = dDef

Datasets
  gp1_ds1: Grid1D
  dset1: Solution | solution = sol1

Plots
  pg2: PlotGroup1D "1D Plot Group 2" | data = dset1; xlabel = x; ylabel = u
    lngr1: LineGraph on all domains | expr = u

Exports
  anim1: Animation | target = player; maxframes = 20