// COMSOL Multiphysics 6.0.0.318 model "Poisson.mph"
// Outline of the model tree
// Unit system: none

Geometry
  geom1 "Geometry 1" (1D, length unit m)
    i1: Interval "center"
    i2: Interval "left" | coord = {-0.3, 0}
    i3: Interval "right" | coord = {1, 1.3}
    fin: Finalize "Form Union"

Physics
  lpeq: LaplaceEquation (disabled) on all domains
    dependent variable u2
    leq1: LaplaceEquation (default)
    zflx1: ZeroFluxBoundary "Zero Flux 1" (default)
    init1: init "Initial Values 1" (default)
  eq: PoissonEquation "Poisson's Equation" on all domains
    dependent variable u
    ShapeProperty.order = 1
    peq1: PoissonEquation "Poisson's Equation 1" (default) | f = u; c = 1
    zflx1: ZeroFluxBoundary "Zero Flux 1" (default)
    init1: init "Initial Values 1" (default) | u = 0; ut = 15
    flux1: FluxBoundary "Flux/Source 1" (disabled) on boundaries 1, 4 | g = 10
    flux2: FluxBoundary "Flux/Source 2" (disabled) on boundaries 2 | g = -10
    peq2: PoissonEquation "Poisson's Equation 2" on domains 1, 3 | f = 0

Mesh
  mesh1 "Mesh 1"
    size: MeshSizeDefault | hmax = 0.001; hauto = 1; custom = on
    edg1: Edge on remaining entities

Studies
  std1 "Study 1"
    stat: Stationary

Solver configurations
  sol1 "Solution 1" (study std1)
    v1: Variables "Dependent Variables 1"
    s1: Stationary "Stationary Solver 1"
      dDef: Direct
      fc1: FullyCoupled | linsolver = dDef

Datasets
  dset1: Solution | solution = sol1

Plots
  pg1: PlotGroup1D "1D Plot" | data = dset1
    lngr1: LineGraph on all domains | expr = u; xdata = expr; xdataexpr = x