// COMSOL Multiphysics 6.0.0.318 model "System.mph"
// Outline of the model tree
// Unit system: none

Parameters
  g = 4  // Coefficient gamma
  a = 0.01

Functions
  pw1: Piecewise "Light" | funcname = L; smooth = contd2; pieces = {{0, 0.3, 0}, {0.3, 0.5, 1}, {0.5, 1, 0}}
  an1: Analytic "Reaction" | funcname = f; expr = (-log(1-cP-cN/(1-cN)))^(3/4)

Geometry
  geom1 "Geometry" (1D, length unit m)
    i1: Interval | coord = 0, 1
    fin: Finalize "Form Union"

Physics
  tcs: ConcentratedSpecies "Transport of Concentrated Species" on all domains
    dependent variable cN = {cN, cM, cP}
    Ac.Ac = 0.01
    TransportMechanism.DiffusionModel = FicksLaw
    TransportMechanism.KnudsenDiffusion = 0
    SpeciesProperties.FromMassConstraint = 3
    cdm1: ConvectionDiffusionMigration "Transport Properties" (default)
      rho_src = userdef
      rho = 1
      M_cN = 1
      M_cM = 1
      M_cP = 1
      u_src = fromCommonDef
      Df = 
        {a, 0, 0, 0, a, 0, 0, 0, a}
        {a *exp(-cP/0.13), 0, 0, 0, a *exp(-cP/0.13), 0, 0, 0, a *exp(-cP/0.13)}
        {a *exp(-cP/0.13), 0, 0, 0, a *exp(-cP/0.13), 0, 0, 0, a *exp(-cP/0.13)}
      minput_pressure = 1
    init1: init "Initial Values" (default)
      MixtureSpecification = MoleFractions
      w0 = {0.2, 0.79, 0.1}
      x0 = {0.2, 0.79, 0.0001}
    nflx1: NoFlux (default)
    reac1: ReactionSources on domains 1
      MassTransferToOtherPhases = 0
      R_cM_src = userdef
      R_cM = -L(x)
      R_cP = 4*L(x)*(-log(cM/(1-cN)))^(3/4)

Mesh
  mesh1 "Mesh" (physics-controlled)
    size: MeshSizeDefault | hauto = 1

Studies
  std1 "Study"
    time: Transient "Time Dependent" | tlist = range(0,0.0040404040404,0.4)

Solver configurations
  sol1 "Solution 1" (study std1)
    v1: Variables "Dependent Variables 1"
    t1: Time "Time-Dependent Solver 1"
      tlist = range(0,0.0040404040404,0.4)
      rtol = 0.005
      tstepsbdf = intermediate
      maxorder = 2
      eventtol = 0.0001
      stabcntrl = on
      masssingular = yes
      estrat = exclude
      fc1: FullyCoupled
        linsolver = d1
        dtech = auto
        maxiter = 8
        damp = 0.9
        jtech = once
        stabacc = aacc
        aaccdim = 5
        aaccmix = 0.9
        aaccdelay = 1
      d1: Direct "Direct, mass fractions (tcs)" | linsolver = pardiso; pivotperturb = 1.0E-13

Datasets
  dset1: Solution | solution = sol1

Plots
  pg1: PlotGroup1D "Concentrations, All Species (tcs)" | data = dset1; title = Concentrations, All Species
    lngr1: LineGraph "Species cN" on all domains | expr = tcs.c_cN; xdata = expr; xdataexpr = x; autosolution = off
    lngr2: LineGraph "Species cM" on all domains | expr = tcs.c_cM; xdata = expr; xdataexpr = x; autosolution = off
    lngr3: LineGraph "Species cP" on all domains | expr = tcs.c_cP; xdata = expr; xdataexpr = x; autosolution = off
    lngr4: LineGraph "Light graph" on domains 1 | data = dset1; expr = L(x); descr = Light
  pg2: PlotGroup1D "Concentration, cN (tcs)" | data = dset1; prefixintitle = Species cN:; typeintitle = off
    lngr1: LineGraph on all domains | expr = tcs.c_cN; xdata = expr; xdataexpr = x
  pg3: PlotGroup1D "Concentration, cM (tcs)" | data = dset1; prefixintitle = Species cM:; typeintitle = off
    lngr1: LineGraph on all domains | expr = tcs.c_cM; xdata = expr; xdataexpr = x
  pg4: PlotGroup1D "Concentration, cP (tcs)" | data = dset1; prefixintitle = Species cP:; typeintitle = off
    lngr1: LineGraph on all domains | expr = tcs.c_cP; xdata = expr; xdataexpr = x

Exports
  anim1: Animation "Full system" | target = player
  anim2: Animation "Conc N" | target = player