// COMSOL Multiphysics 6.0.0.318 model "test_chem.mph"
// Outline of the model tree
// Unit system: none

Geometry
  geom1 "Geometry" (1D, length unit m)
    i1: Interval
    i2: Interval | coord = {-0.25, 0}
    i3: Interval | coord = {1, 1.3}
    fin: Finalize "Form Union"

Physics
  tcs: ConcentratedSpecies "Transport of Concentrated Species" on all domains
    dependent variable n = {n, p, m}
    EquationForm.form = Automatic
    Ac.Ac = 1
    TransportMechanism.DiffusionModel = FicksLaw
    TransportMechanism.KnudsenDiffusion = 0
    SpeciesProperties.FromMassConstraint = 1
    cdm1: ConvectionDiffusionMigration "Transport Properties 1" (default)
      rho_src = userdef
      rho = 1
      minput_pressure_src = fromCommonDef
      minput_temperature_src = fromCommonDef
      M_n = 1
      M_p = 1
      M_m = 1
    init1: init "Initial Values 1" (default) | MixtureSpecification = MoleFractions
    nflx1: NoFlux (default)

Mesh
  mesh1 "Hight mesh"
    size: MeshSizeDefault | hauto = 2
    edg1: Edge on domains 2
  mesh2 "Low mesh"
    size: MeshSizeDefault | hauto = 6
    edg1: Edge on domains 1, 3

Studies
  std1 "Study 1"
    time: Transient "Time Dependent" | tlist = range(0,0.1,1)